** 16 vlastn�ch frekvenc� (Hz/2*pi*16,05)
*NODE, NSET=Nall
       1,1.000000000000e-002,1.000000000000e-002,0.000000000000e+000
       2,1.000000000000e-002,5.000000000000e-003,0.000000000000e+000
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*ELEMENT, TYPE=C3D20, ELSET=Eall
     1,     1,     2,     3,     4,     5,     6,     7,     8,     9,    10,
          11,    12,    17,    18,    19,    20,    13,    14,    15,    16
     2,     4,     3,    21,    22,     8,     7,    23,    24,    11,    25,
          26,    27,    19,    30,    31,    32,    16,    15,    28,    29
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** Names based on fix1
*NSET,NSET=Nfix1
1,
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** Names based on fix2
*NSET,NSET=Nfix2
1,
5,
13,
129,
133,
** Names based on fix3
*NSET,NSET=Nfix3
1,
*MATERIAL, Name=steel
*ELASTIC
  210000000000, 0.3
*DENSITY
7850
*SOLID SECTION, Elset=Eall, Material=steel
*STEP
*STATIC
*BOUNDARY
  Nfix1,1,3,0
**  Nfix2,2,3,0
**  Nfix3,1,3,0
*FREQUENCY
16
*NODE FILE
  U
*EL FILE
  S, E
*END STEP
