*NODE
1,0.0006766242921297,0.0006806909056472,0.001860334182587
2,0.003813791848291,-2.690448713521E-05,0.0018868914963
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*ELEMENT,TYPE=C3D20
1,66,59,75,71,72,85,60,65,137,138,139,140,145,146,147,
148,141,142,143,144
2,59,78,80,75,85,56,52,60,149,150,151,138,154,155,156,
146,142,152,153,143
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*ELEMENT,TYPE=C3D8
49,463,494,531,477,464,495,532,478
50,493,507,540,530,494,508,541,531
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*ELSET,ELSET=bumpers
49
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*ELSET,ELSET=film
1
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*SURFACE,NAME=s1
79,S3
78,S3
57,S3
69,S3
56,S3
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60,S5
*SURFACE,NAME=s2
2,S1
1,S1
6,S1
5,S1
4,S1
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45,S2
*SURFACE,NAME=pfaces
7,S1
4,S1
13,S1
12,S1
3,S1
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1,S1
*MATERIAL,NAME=mat_film
*ELASTIC,TYPE=ISOTROPIC
100000000,0.3
*SOLID SECTION,ELSET=bumpers,MATERIAL=mat_film
*SOLID SECTION,ELSET=film,MATERIAL=mat_film
*BOUNDARY
5,1,,0
5,2,,0
5,3,,0
18,1,,0
18,2,,0
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542,3,,0
*AMPLITUDE,NAME=Aconstant
0,1
*AMPLITUDE,NAME=A0
0,0
1,1

*****************************************************************
******* UNCOMMENT THESE LINES AND RUN WILL GET PAST BUCKING "POP"
** *CONTACT PAIR,INTERACTION=SI_2,TYPE=SURFACE TO SURFACE
** s2,s1
** *SURFACE INTERACTION,NAME=SI_2
** *SURFACE BEHAVIOR,PRESSURE-OVERCLOSURE=LINEAR
** 10000
*****************************************************************

*STEP,NLGEOM=YES,INC=100
*STATIC,DIRECT
0.01,1,0,0
*DSLOAD,AMPLITUDE=A0
pfaces,P,34000
*NODE FILE,GLOBAL=YES
U,RF
*EL FILE
S
*END STEP
