*HEADING
MODEL DYNAMICALLY GENERATED BOX_TEST_X1.inp
** THIS MESH WAS GENERATED ON Wednesday, January 9th, 2013 at 09:34:12 AM
********************************************************************************
********************************************************************************
*NODE, NSET=NA_PLATE
101, 0.0, -5.0, 10.0
102, 0.0, -4.16666666667, 10.0
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*NODE, NSET=NB_PLATE
10101, 10.0, -5.0, 20.0
10102, 10.0, -4.16666666667, 20.0
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*NODE, NSET=NC_PLATE
20201, 10.0, -5.0, 10.8333333333
20203, 10.0, -3.33333333333, 10.8333333333
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*NODE, NSET=ND_PLATE
30201, 0.0, -5.0, 19.1666666667
30203, 0.0, -3.33333333333, 19.1666666667
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*NODE, NSET=NE_PLATE
40203, 0.833333333333, 5.0, 11.6666666667
40205, 0.833333333333, 5.0, 13.3333333333
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*NODE, NSET=NF_PLATE
50203, 1.66666666667, -5.0, 10.8333333333
50205, 3.33333333333, -5.0, 10.8333333333
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*NSET, NSET=NALL
NA_PLATE, NB_PLATE, NC_PLATE, ND_PLATE, NE_PLATE, NF_PLATE
********************************************************************************
*ELEMENT, TYPE=S8R, ELSET=SEL_101
101, 101, 301, 303, 103, 201, 302, 203, 102
*ELEMENT, TYPE=S8R, ELSET=SEL_102
102, 103, 303, 305, 105, 203, 304, 205, 104
*ELEMENT, TYPE=S8R, ELSET=SEL_103
103, 105, 305, 307, 107, 205, 306, 207, 106
*ELEMENT, TYPE=S8R, ELSET=SEL_104
104, 107, 307, 309, 109, 207, 308, 209, 108
*ELEMENT, TYPE=S8R, ELSET=SEL_105
105, 109, 309, 311, 111, 209, 310, 211, 110
*ELEMENT, TYPE=S8R, ELSET=SEL_106
106, 111, 311, 313, 113, 211, 312, 213, 112
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*ELSET, ELSET=EALL
101, 102, 103, 104, 105, 106
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********************************************************************************
*MATERIAL, NAME=MAT
*DENSITY
0.000144
*ELASTIC, TYPE=ENGINEERING CONSTANTS
35000000.0, 35000000.0, 35000000.0, 0.3, 0.3, 0.3, 13461538.4615, 13461538.4615
13461538.4615
*SHELL SECTION, ELSET=EALL, MATERIAL=MAT
0.5
********************************************************************************
*BOUNDARY
101, 1
101, 2
101, 3
101, 4
101, 5
101, 6
********************************************************************************
***STEP, NLGEOM
*STEP
*STATIC
***CLOAD, OP=NEW
*CLOAD
10113, 1, 1000.0
***BOUNDARY, OP=NEW
**101, 1
**101, 2
**101, 3
**101, 4
**101, 5
**101, 6
********************************************************************************
*NODE PRINT, NSET=NALL
U, RF
***NODE FILE, OUTPUT=3D
*NODE FILE
U, RF
*EL PRINT, ELSET=EALL
S
***EL FILE, OUTPUT=3D
*EL FILE
S
*END STEP
********************************************************************************
********************************************************************************
***STEP, NLGEOM
*STEP
*STATIC
***CLOAD, OP=NEW
*CLOAD
10113, 2, 1000.0
***BOUNDARY, OP=NEW
**101, 1
**101, 2
**101, 3
**101, 4
**101, 5
**101, 6
********************************************************************************
*NODE PRINT, NSET=NALL
U, RF
***NODE FILE, OUTPUT=3D
*NODE FILE
U, RF
*EL PRINT, ELSET=EALL
S
***EL FILE, OUTPUT=3D
*EL FILE
S
*END STEP
********************************************************************************
********************************************************************************
***STEP, NLGEOM
*STEP
*STATIC
***CLOAD, OP=NEW
*CLOAD
10113, 3, 1000.0
***BOUNDARY, OP=NEW
**101, 1
**101, 2
**101, 3
**101, 4
**101, 5
**101, 6
********************************************************************************
*NODE PRINT, NSET=NALL
U, RF
***NODE FILE, OUTPUT=3D
*NODE FILE
U, RF
*EL PRINT, ELSET=EALL
S
***EL FILE, OUTPUT=3D
*EL FILE
S
*END STEP
********************************************************************************
