**Datei: Flanschberechnung von "DATUM"

*NODE,NSET=NALL
1,14.815, 2.347, 0.100
2,14.266, 4.635, 0.200
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*ELEMENT, TYPE=B31, ELSET=Feder
1,1,2
2,2,3
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

*NSET,NSET=NLoad
299,
298,
297,
296,
295
*NSET,NSET=NFix
1,
2,
3,
4,
5

**SOLID SECTION,ELSET=GAP_X,MATERIAL=EL
**GAP,ELSET=GAP_X
**4.0,0.,0.,1.
*MATERIAL,NAME=EL
*ELASTIC
206000.0,.268

*BEAM SECTION,ELSET=Feder,MATERIAL=EL,SECTION=RECT
4.00, 4.00

*BOUNDARY
NFix,1,3
NLoad,1,2

*STEP
*STATIC
*CLOAD
NLoad,3,100.0

*EL FILE
S
*NODE FILE
U
*END STEP
