*Heading
** Job name: test3 Model name: Model-1
** Generated by: Abaqus/CAE 6.13-1
**
**
*Node
    1,           0.,   1541.76526
    2,   28.8853359,   1541.76526
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*Element, type=CAX4
    1,   1,   2,  20,  19
    2,   2,   3,  21,  20
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*Nset, nset=Rotor_Total, generate
    1,  8546,     1
*Elset, elset=Rotor_Total, generate
    1,  8256,     1
*Elset, elset=_5_Elemente
    593,   594,   602,   610,   613,
*Nset, nset=Element1
    79, 2457, 2482, 77
*Nset, nset=Element2
    999, 2202, 2457, 79
*Nset, nset=Element3
    999, 79, 78, 490
*Nset, nset=Element4
    78, 80, 1063, 490
*Nset, nset=Element5
    80, 725, 482, 1063
** Section: Section-1
*Solid Section, elset=Rotor_Total, material=ST10TS
    ,
**
**
**
**
**
*Nset, nset=Rotor_Bearing_Axial-fixture
    7781, 7783, 7787, 7789, 7790, 7806
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*Elset, elset=Rotor_Bearing_Axial-fixture, generate
    8240,  8256,     1
*Nset, nset=Rotor_Total2, generate
    1,  8546,     1
*Elset, elset=Rotor_Total2, generate
    1,  8256,     1
*Nset, nset=_PickedSet12, generate
    1,  8546,     1
*Elset, elset=_PickedSet12, generate
    1,  8256,     1
*Elset, elset=_x1_S2
    17,   34,   51,   68,   85,  102
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*Elset, elset=_x1_S1
    813, 841
*Elset, elset=_x1_S4
    814, 5513, 5550, 5587, 5624, 5661
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*Elset, elset=_x1_S3
    885,
*Elset, elset=x1
    _x1_S2
    _x1_S1
    _x1_S4
    _x1_S3
*Elset, elset=_x2_S2
    1611, 1612, 1617, 1620, 2154, 2284, 2285, 2288, 2290, 3998, 4045, 5466
*Elset, elset=_x2_S4
    1609, 1616, 2210, 2211, 2212, 2214, 2215, 2220, 3999
*Elset, elset=_x2_S1
    1614, 2221, 2286, 4037, 4046
*Elset, elset=_x2_S3
    4049, 4180, 5237, 6761, 6762, 6763
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*Elset, elset=x2
    _x2_S2
    _x2_S4
    _x2_S1
    _x2_S3
*Elset, elset=_x3_S4, generate
    6795,  7509,    17
*Elset, elset=x3
    _x3_S4
*Elset, elset=_x4_S4, generate
    7526,  8240,    17
*Elset, elset=x4
    _x4_S4
*Elset, elset=_x5_S1
    1179, 1180, 1181, 1210, 1211, 1667, 1677, 1695, 1708, 1713, 2371, 2372, 2374, 2378, 2382, 2385
*Elset, elset=_x5_S3
    1702, 1718, 2238, 2239, 2241, 2380
*Elset, elset=_x5_S2
    1722, 2234
*Elset, elset=_x5_S4
    1723,
*Elset, elset=x5
    _x5_S1
    _x5_S3
    _x5_S2
    _x5_S4
*Amplitude, name=Amp-1
        1.,              2.,              3.,              4.
*Amplitude, name=Rotational-body-force
        0.,              0.,            600.,             10.,           1200.,             20.,           1800.,             30.
    2400.,             40.,           3000.,             50.,           3600.,             50.,           4200.,             50.
    4800.,             50.,           5400.,             50.,           6000.,             50.,           6600.,             50.
    7200.,             50.,           7800.,             50.,           8400.,             50.,           9000.,             50.
    9600.,             50.,          10200.,             50.,          10800.,             50.,          11400.,             50.
    12000.,             50.,          12600.,             50.,          13200.,             50.,          13800.,             50.
    14400.,             50.,          15000.,             50.,          15600.,             50.,          16200.,             50.
    16800.,             50.,          17400.,             50.,          18000.,             50.
**
*Amplitude, name =x1_temp
    0,500,
    120,500,
    240,500,
    360,500,
    480,500,
    600,500,
    720,500,
    840,500,
    960,500,
    1080,500,
    1200,500,
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    6600,500,
*Amplitude, name =x1_alpha
    0,10,
    120,10,
    240,10,
    360,10,
    480,10,
    600,10,
    720,10,
    840,10,
    960,10,
    1080,10,
    1200,10,
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    6600,10,
*Amplitude, name =x2_temp
    0,500,
    120,500,
    240,500,
    360,500,
    480,500,
    600,500,
    720,500,
    840,500,
    960,500,
    1080,500,
    1200,500,
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    6600,500,
*Amplitude, name =x2_alpha
    0,10,
    120,10,
    240,10,
    360,10,
    480,10,
    600,10,
    720,10,
    840,10,
    960,10,
    1080,10,
    1200,10,
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    6600,10,
*Amplitude, name =x3_temp
    0,500,
    120,500,
    240,500,
    360,500,
    480,500,
    600,500,
    720,500,
    840,500,
    960,500,
    1080,500,
    1200,500,
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    6600,500,
*Amplitude, name =x3_alpha
    0,10,
    120,10,
    240,10,
    360,10,
    480,10,
    600,10,
    720,10,
    840,10,
    960,10,
    1080,10,
    1200,10,
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    6600,10,
*Amplitude, name =x4_temp
    0,500,
    120,500,
    240,500,
    360,500,
    480,500,
    600,500,
    720,500,
    840,500,
    960,500,
    1080,500,
    1200,500,
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    6600,500,
*Amplitude, name =x4_alpha
    0,10,
    120,10,
    240,10,
    360,10,
    480,10,
    600,10,
    720,10,
    840,10,
    960,10,
    1080,10,
    1200,10,
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    6600,10,
*Amplitude, name =x5_temp
    0,500,
    120,500,
    240,500,
    360,500,
    480,500,
    600,500,
    720,500,
    840,500,
    960,500,
    1080,500,
    1200,500,
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    6600,500,
*Amplitude, name =x5_alpha
    0,10,
    120,10,
    240,10,
    360,10,
    480,10,
    600,10,
    720,10,
    840,10,
    960,10,
    1080,10,
    1200,10,
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    6600,10,
**
** MATERIALS
**
** Program MDAT 1.02   - Material Data for Program ABAQUS -- 20.08.13
** P:\DBANK\MATD0.SD1  13-02-15
** MATERIAL  -    38   ST10TS           SchmiedS
*Material,name= ST10TS
*law=user
*Elastic
** Estatic   Poiss   Temp
**   MPa       [-]    �C
    212000.0,  0.2850,   20.
    210500.0,  0.2865,   50.
    208000.0,  0.2890,  100.
    205000.0,  0.2915,  150.
    202000.0,  0.2940,  200.
    198500.0,  0.2970,  250.
    195000.0,  0.3000,  300.
    191000.0,  0.3030,  350.
    186000.0,  0.3050,  400.
    180000.0,  0.3080,  450.
    171000.0,  0.3120,  500.
    159000.0,  0.3150,  550.
    142000.0,  0.3180,  600.
    120000.0,  0.3210,  650.
*Plastic
**  D = 1000 mm  Lambda =  1.000    epse = 0.20 %
**Sigma[MPa]  eps[-] Temp[�C]
    696.019, 0.0    ,   20.
    854.649, 0.05894,   20.
    677.424, 0.0    ,   50.
    830.612, 0.05902,   50.
    646.430, 0.0    ,  100.
    790.551, 0.05917,  100.
    626.630, 0.0    ,  150.
    763.843, 0.05924,  150.
    606.828, 0.0    ,  200.
    737.135, 0.05932,  200.
    587.026, 0.0    ,  250.
    710.427, 0.05939,  250.
    567.223, 0.0    ,  300.
    683.720, 0.05946,  300.
    539.643, 0.0    ,  350.
    657.012, 0.05953,  350.
    512.062, 0.0    ,  400.
    630.304, 0.05958,  400.
    482.263, 0.0    ,  450.
    592.913, 0.05968,  450.
    437.656, 0.0    ,  500.
    534.156, 0.05985,  500.
    382.865, 0.0    ,  550.
    470.057, 0.06001,  550.
    313.264, 0.0    ,  600.
    384.592, 0.06026,  600.
    227.743, 0.0    ,  650.
    309.810, 0.06039,  650.
*expansion,zero=20
**   1/K        �C
    10.400E-06,   20.
    10.513E-06,   50.
    10.700E-06,  100.
    10.850E-06,  150.
    11.000E-06,  200.
    11.200E-06,  250.
    11.400E-06,  300.
    11.550E-06,  350.
    11.700E-06,  400.
    11.850E-06,  450.
    12.000E-06,  500.
    12.150E-06,  550.
    12.300E-06,  600.
    12.500E-06,  650.
*conductivity
**  mW/(mm K)   �C
    24.000,   20.
    24.150,   50.
    24.400,  100.
    24.600,  150.
    24.800,  200.
    24.950,  250.
    25.100,  300.
    25.300,  350.
    25.600,  400.
    25.900,  450.
    26.100,  500.
    26.300,  550.
    26.400,  600.
    26.500,  650.
*Density
**  t/mm**3
    7.760E-09,
*specific heat
** mJ/(t K)     �C
    439000000.,   20.
    461875000.,   50.
    500000000.,  100.
    517000000.,  150.
    534000000.,  200.
    552500000.,  250.
    571000000.,  300.
    596000000.,  350.
    625000000.,  400.
    659000000.,  450.
    704000000.,  500.
    763000000.,  550.
    831000000.,  600.
    899000000.,  650.
**
** End file: D:\Documents and Settings\mfranke\Desktop\MDAT f�r Philipp\ST10TS_e
**
** BOUNDARY CONDITIONS
**
** Name: BC-1 Type: Displacement/Rotation
*Boundary
    Rotor_Bearing_Axial-fixture, 2, 2
**
** PREDEFINED FIELDS
**
** Name: Start_Temperature   Type: Temperature
*Initial Conditions, type=TEMPERATURE
    Rotor_Total2, 20.
** ----------------------------------------------------------------
**
** STEP: Cycle01(t)
**
*Step, inc=10000
*Coupled Temperature-displacement, deltmx=1000.
    0.001, 10000., 0.001, 1000.
**
** LOADS
**
** Name: Rotor_Rotational-body-force   Type: Rotational body force
*Dload
    _PickedSet12, CENTRIF, 98695.9,0.,0.,0.,0.0,1.0,0.0
**
** INTERACTIONS
**
** Interaction: x1
*Film
    x1, F1, 1., 1.
** Interaction: x2
*Film
    x2, F1, 1., 1.
** Interaction: x3
*Film
    x3, F1, 1., 1.
** Interaction: x4
*Film
    x4, F1, 1., 1.
** Interaction: x5
*Film
    x5, F1, 1., 1.
**
** OUTPUT REQUESTS
**
*Restart, write, frequency=0
**
** FIELD OUTPUT: F-Output-1
**
**Output fuer *.frd File
*NODE FILE
    NT, U
*EL FILE
    S, E, PEEQ, SDV
**Output fuer *.dat File
*NODE PRINT, nset=Element1
    NT
*NODE PRINT, nset=Element2
    NT
*NODE PRINT, nset=Element3
    NT
*NODE PRINT, nset=Element4
    NT
*NODE PRINT, nset=Element5
    NT
*EL PRINT, elset=_5_Elemente
    E, PEEQ, SDV
**
*End Step
