**
** Heading +++++++++++++++++++++++++++++++++++++++++++++++++
**
*Heading
Model: Model-1,     Date: 11/29/2018
**
** Nodes +++++++++++++++++++++++++++++++++++++++++++++++++++
**
*Node
1, -7.50000000E+000, 2.50000000E+000, 7.50000000E+000
2, 7.50000000E+000, 2.50000000E+000, 7.50000000E+000
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**
** Elements ++++++++++++++++++++++++++++++++++++++++++++++++
**
*Element, Type=C3D10, Elset=Punch
1, 1122, 1123, 1124, 1125, 3095, 3094, 3093, 3097, 3096, 3098
2, 1123, 1126, 1127, 1128, 3101, 3100, 3099, 3103, 3102, 3104
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*Element, Type=C3D8R, Elset=Plate
35623, 54282, 54283, 54344, 54343, 52391, 52392, 52453, 52452
35624, 54283, 54284, 54345, 54344, 52392, 52393, 52454, 52453
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**
** Node sets +++++++++++++++++++++++++++++++++++++++++++++++
**
*Nset, Nset=Npnch
1122, 1123, 1124, 1125, 3095, 3094
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*Nset, Nset=Dirich
58103, 58104, 56213, 56212, 54322, 54321
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
*Nset, Nset=internal-1_Slave_plate
58253, 58314, 58315, 58254, 58316, 58255
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*Nset, Nset=internal-2_Master_punch
706, 213, 214, 18399, 16785, 18401
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**
** Element sets ++++++++++++++++++++++++++++++++++++++++++++
**
*Elset, Elset=Poincon
1, 2, 3, 4, 5, 6
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*Elset, Elset=Tole
35623, 35624, 35625, 35626, 35627, 35628
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*Elset, Elset=internal-1_Slave_plate_S1
39409, 39410, 39411, 39412, 39413, 39414
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*Elset, Elset=internal-2_Master_punch_S3
6490, 5569, 8319, 2376, 5840, 6141
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*Elset, Elset=internal-3_Master_punch_S2
6102, 6572, 6169, 2856, 4378, 4031
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*Elset, Elset=internal-4_Master_punch_S1
13066, 11678, 4130, 9641, 10296, 9233
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*Elset, Elset=internal-5_Master_punch_S4
8273, 3768, 5500, 11793, 8221, 5994
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**
** Surfaces ++++++++++++++++++++++++++++++++++++++++++++++++
**
*Surface, Name=Slave_plate, Type=Element
internal-1_Slave_plate_S1, S1
*Surface, Name=Master_punch, Type=Element
internal-2_Master_punch_S3, S3
internal-3_Master_punch_S2, S2
internal-4_Master_punch_S1, S1
internal-5_Master_punch_S4, S4
**
** Materials +++++++++++++++++++++++++++++++++++++++++++++++
**
*Material, Name=Al-St
*Elastic
211000, 0.33
*Plastic
91.30000305,	0
109.9302902,	0.001
128.3060303,	0.002
140.4479523,	0.003
149.753418,	0.004
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520.7987671,	1.070000052
*Material, Name=Steel
*Elastic
200000, 0.3
**
** Sections ++++++++++++++++++++++++++++++++++++++++++++++++
**
*Solid section, Elset=Punch, Material=Steel
*Solid section, Elset=Plate, Material=Al-St
**
** Constraints +++++++++++++++++++++++++++++++++++++++++++++
**
*Rigid body, Nset=Npnch, Ref node=59955, Rot node=59956
** contact
*Contact Pair, Interaction=SI1, Type=Surface To Surfacesheetdown
Slave_plate, Master_punch
*Surface Interaction, Name=SI1
*Surface Behavior, Pressure-Overclosure=Linear
10550000
*Friction
0.25, 1055000
**
** Steps +++++++++++++++++++++++++++++++++++++++++++++++++++
**
**
** Step-1 ++++++++++++++++++++++++++++++++++++++++++++++++++
**
*Step, Nlgeom, Inc=100
*Static
0.0001, 1, 1E-08, 1E+30
**
** Boundary conditions +++++++++++++++++++++++++++++++++++++
**
*Boundary, op=NEW
** Name: BC-1
*Boundary
Dirich, 1, 1, 0
Dirich, 2, 2, 0
Dirich, 3, 3, 0
Dirich, 4, 4, 0
Dirich, 5, 5, 0
Dirich, 6, 6, 0
** Name: BC-2
*Boundary
59955, 1, 1, 0
59955, 2, 2, -10
59955, 3, 3, 0
59956, 1, 1, 0
59956, 2, 2, 0
59956, 3, 3, 0
**
** Loads +++++++++++++++++++++++++++++++++++++++++++++++++++
**
*Dload, op=NEW
*Cload, op=NEW
**
** Field outputs +++++++++++++++++++++++++++++++++++++++++++
**
*Node file
U
*El file
E, S, ERR
**
** End step ++++++++++++++++++++++++++++++++++++++++++++++++
**
*End step
**
** Step-2 ++++++++++++++++++++++++++++++++++++++++++++++++++
**
*Step, Nlgeom, Inc=100
*Static
0.001, 1, 1E-08, 1E+30
**
** Boundary conditions +++++++++++++++++++++++++++++++++++++
**
*Boundary, op=NEW
** Name: BC-1
*Boundary
Dirich, 1, 1, 0
Dirich, 2, 2, 0
Dirich, 3, 3, 0
Dirich, 4, 4, 0
Dirich, 5, 5, 0
Dirich, 6, 6, 0
** Name: BC-2
*Boundary
59955, 1, 1, 0
59955, 2, 2, 1
59955, 3, 3, 0
59956, 1, 1, 0
59956, 2, 2, 0
59956, 3, 3, 0
**
** Loads +++++++++++++++++++++++++++++++++++++++++++++++++++
**
*Dload, op=NEW
*Cload, op=NEW
**
** Field outputs +++++++++++++++++++++++++++++++++++++++++++
**
*Node file
U
*El file
E, S, ERR
**
** End step ++++++++++++++++++++++++++++++++++++++++++++++++
**
*End step
