*Heading
File generated by TexGen v3.3.0
************
*** MESH ***
************
*Node
1, 0, -1.81841e-017, 0
2, 0, -1.81841e-017, 0.0494998
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*Element, Type=C3D10
1, 4541, 292, 1019, 4542, 5391, 5392, 5393, 5394, 5395, 5396
2, 4542, 292, 1019, 1020, 5395, 5392, 5396, 5397, 5398, 5399
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********************
*** ORIENTATIONS ***
********************
** Orientation vectors
** 1st vector represents the fibre direction
** 2nd vector is an arbitrary vector perpendicular to the first
*Distribution Table, Name=TexGenOrientationVectors
COORD3D,COORD3D
*Distribution, Location=Element, Table=TexGenOrientationVectors, Name=TexGenOrientationVectors, Input=Ex3.1.ori
*Orientation, Name=TexGenOrientations, Definition=coordinates
TexGenOrientationVectors
1, 0
********************
*** ELEMENT SETS ***
********************
** TexGen generates a number of element sets:
** All - Contains all elements
** Matrix - Contains all elements belonging to the matrix
** YarnX - Where X represents the yarn index
*ElSet, ElSet=All, Generate
1, 26029, 1
*ElSet, ElSet=Matrix
1, 2, 3, 11, 12, 13
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*ElSet, ElSet=Yarn0
14, 25, 26, 27, 28, 29
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*ElSet, ElSet=Yarn1
196, 197, 198, 259, 260, 383
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*ElSet, ElSet=Yarn2
4, 5, 6, 7, 8, 9
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*ElSet, ElSet=Yarn3
180, 181, 182, 183, 184, 216
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*****************
*** MATERIALS ***
*****************
*Material, Name=TexGenGenerated
*Elastic
1.0, 0.0
*DepVar
5
*Solid Section, ElSet=Matrix, Material=TexGenGenerated, Orientation=TexGenOrientations
1.0,
*Solid Section, ElSet=Yarn0, Material=TexGenGenerated, Orientation=TexGenOrientations
1.0,
*Solid Section, ElSet=Yarn1, Material=TexGenGenerated, Orientation=TexGenOrientations
1.0,
*Solid Section, ElSet=Yarn2, Material=TexGenGenerated, Orientation=TexGenOrientations
1.0,
*Solid Section, ElSet=Yarn3, Material=TexGenGenerated, Orientation=TexGenOrientations
1.0,
** Note: Additional element data are stored as a depvars:
** 1 - Yarn Index (-1 for matrix, first yarn starting at 0)
** 2/3 - Location (x and y cross-section coordinates of element relative to yarn centerline)
** 4 - Volume fraction
** 5 - Distance of element from the surface of the yarn (for yarn elements only, distance is negative)
*Initial Conditions, Type=Solution, Input=Ex3.1.eld
************
*** STEP ***
************
*Step, Name=TexGenGenerated
*Static
*Output, Field, Variable=PRESELECT
*Element Output
SDV
*Node Print
U
*End Step
