*node, nset=ntub
1, 0.0, 0.0, 0.0
2, 0.502393162395, 0.0, 0.0
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*node, nset=ngun
235, 117.56, 0.0, 0.0
236, 118.06390625, 0.0, 0.0
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*element, type=b32, elset=etub
1, 1, 2, 3
2, 3, 4, 5
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*element, type=b32, elset=egun
118, 235, 236, 237
119, 237, 238, 239
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*beam section, section=rect, elset=etub, material=steel
0.0484486325916, 0.0484486325916
 0.0, 1.0, 0.0
*beam section, section=rect, elset=egun, material=steel
0.0919738006173, 0.0919738006173
 0.0, 1.0, 0.0
*material, name=steel
*elastic, type=iso
210.e9, 0.3
*DENSITY
 7850.
*boundary
 ntub, 2,6
*boundary
 ngun, 2,6
*boundary
 1, 1,6
*step
*FREQUENCY,SOLVER=ARPACK,STORAGE=YES
 2
*NODE FILE
 U
*end step
