*HEADING
Model: solid_initial_condition_tube

*NODE, NSET=Nall
       1,-1.000000000000e+002,1.732050807569e+002,0.000000000000e+000
       2,-7.092097740851e+001,1.870032485371e+002,0.000000000000e+000
       3,-7.092097740851e+001,1.870032485371e+002,2.500000000000e+001
       4,-1.000000000000e+002,1.732050807569e+002,2.500000000000e+001
       5,-8.750000000000e+001,1.515544456623e+002,0.000000000000e+000
       6,-6.205585523244e+001,1.636278424699e+002,0.000000000000e+000
       7,-6.205585523244e+001,1.636278424699e+002,2.500000000000e+001
       8,-8.750000000000e+001,1.515544456623e+002,2.500000000000e+001
       9,-7.092097740851e+001,1.870032485371e+002,5.000000000000e+001
      10,-1.000000000000e+002,1.732050807569e+002,5.000000000000e+001
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*ELEMENT, TYPE=C3D8, ELSET=Eall
     1,     1,     2,     3,     4,     5,     6,     7,     8
     2,     4,     3,     9,    10,     8,     7,    11,    12
     3,    10,     9,    13,    14,    12,    11,    15,    16
     4,     5,     6,     7,     8,    17,    18,    19,    20
     5,     8,     7,    11,    12,    20,    19,    21,    22
     6,    12,    11,    15,    16,    22,    21,    23,    24
     7,    17,    18,    19,    20,    25,    26,    27,    28
     8,    20,    19,    21,    22,    28,    27,    29,    30
     9,    22,    21,    23,    24,    30,    29,    31,    32
    10,    25,    26,    27,    28,    33,    34,    35,    36
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** Names based on nout
*NSET,NSET=Nnout
1,
2,
3,
4,
9,
10,
13,
14,
41,
42,
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
** Names based on nmid
*NSET,NSET=Nnmid
17,
18,
19,
20,
21,
22,
23,
24,
49,
50,
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** Names based on nins
*NSET,NSET=Nnins
33,
34,
35,
36,
37,
38,
39,
40,
57,
58,
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** Names based on sbound_01
*NSET,NSET=Nsbound_01
1,
2,
5,
6,
17,
18,
25,
26,
33,
34,
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** Names based on sbound_02
*NSET,NSET=Nsbound_02
13,
14,
15,
16,
23,
24,
31,
32,
39,
40,
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
*TRANSFORM,TYPE=C,NSET=Nall
0,0,0,0,0,1

*ORIENTATION,NAME=OR1,SYSTEM=CYLINDRICAL
0.,0.,0.,0.,0.,1.0

*MATERIAL, Name=steel-el

*ELASTIC
210000,0.3

*DENSITY
7.85E-9

*EXPANSION,ZERO=0
12.E-6,0

*SOLID SECTION, Elset=Eall, Material=steel-el

*STEP

*STATIC

*BOUNDARY
Nall,2,3,0

*INITIAL CONDITIONS,TYPE=TEMPERATURE
Nall,0

*TEMPERATURE
Nnout, 500
Nnins, 500

*NODE FILE,GLOBAL=NO
U

*EL FILE
S

*END STEP
