**=============================================================================
**
**             PLATE
**
**=============================================================================
*NODE
10101      ,    0.0000,  0.0000,  0.0000
10102      ,    0.0625,  0.0000,  0.0000
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

*NSET,NSET=N1
10101,10102,10103,10104,10105, 10106, 10107, 10108, 10109
*NSET,NSET=N2
11101,11102,11103,11104,11105, 11106, 11107, 11108, 11109
*NSET,NSET=N3
10101,10201,10301,10401,10501,10601,10701,10801,10901,11001,11101
*NSET,NSET=N4
10109,10209,10309,10409,10509,10609,10709,10809,10909,11009,11109


*Element, type=S4, ELSET=PLATE
10101   ,  10101 , 10102 ,  10202 , 10201
10102   , 10102  , 10103 ,  10203 ,  10202
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

**========================================
*BOUNDARY
N1,1,3
*BOUNDARY
N3,1,6
*BOUNDARY
N4,1,3
*BOUNDARY
N2,1,3

**=================================
*MATERIAL, NAME=ALUMINIUM
*DENSITY
2800
*ELASTIC, TYPE=ISO
69E9, 0.3

**==================================
*SHELL SECTION,MATERIAL=ALUMINIUM,ELSET=PLATE
0.001
**
*STEP
*FREQUENCY
6
*NODE FILE
U
*END STEP
**=============================================================================
**=============================================================================
