** Generated by Mecway 6.0
*NODE
1,0,6.562697276318E-19,-0.005
2,-0.005,3.440195019559E-19,-0.005
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*ELEMENT,TYPE=C3D20R
1,35,4,115,2153,598,63,723,2297,285,384,2212,2211,1074,1398,2690,
2618,1071,321,1395,2619
2,598,63,723,2297,597,62,722,2298,1074,1398,2690,2618,1073,1397,2691,
2621,1069,320,1393,2622
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*NSET,NSET=SetHoleSX
3246
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*NSET,NSET=SetHoleDX
3201
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*NSET,NSET=SETHoleC
3227
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*NSET,NSET=SETHoleBar
1
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*NSET,NSET=displacement_nodes
25
26
*NSET,NSET=displacement_nodes(2)
23
26
3218
3223
3254
3255
*ELSET,ELSET=Geometric_entity_3
1
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*ELSET,ELSET=Geometric_entity_3(2)
513
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*SURFACE,NAME=Geometric_entity_2
385,S3
473,S4
353,S3
477,S4
386,S3
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352,S2
*SURFACE,NAME=Load
103,S6
104,S6
101,S6
102,S6
99,S6
100,S6
97,S6
98,S6
348,S4
352,S4
347,S4
351,S4
346,S4
350,S4
345,S4
349,S4
*SURFACE,NAME=HOLEBAR
385,S1
389,S1
393,S1
397,S1
401,S1
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37,S1
*SURFACE,NAME=Geometric_entity_2(2)
676,S6
669,S5
668,S4
664,S4
660,S4
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601,S4
*SURFACE,NAME=HOLESX
1233,S4
1135,S6
1133,S6
1131,S6
1129,S6
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1121,S6
*SURFACE,NAME=HOLEC
929,S3
879,S6
877,S6
875,S6
873,S6
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865,S6
*SURFACE,NAME=HOLEDX
645,S1
649,S1
653,S1
657,S1
661,S1
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609,S1
*MATERIAL,NAME=Material
*ELASTIC,TYPE=ISOTROPIC
210000000000,0.3
*SOLID SECTION,ELSET=Geometric_entity_3,MATERIAL=Material
*SOLID SECTION,ELSET=Geometric_entity_3(2),MATERIAL=Material
*BOUNDARY
23,1,,0
25,2,,0
26,2,,0
26,1,,0
3201,1,,0
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11122,1,,0
**Transform for local cylindrical


*TRANSFORM, NSET=SetHoleSx,TYPE=C

0,-0.075,0 ,1,-0.075,0

*TRANSFORM, NSET=SetHoleDx,TYPE=C

0,0.075,0 ,1,0.075,0

*RIGID BODY, NSET=SetHoleC, REF NODE=11129

*RIGID BODY, NSET=SetHoleBar, REF NODE=11128

*Equation
2
11129,1,1,11128,1,-1

*Equation
2
11129,2,1,11128,2,-1

*Equation
2
11129,3,1,11128,3,-1

*STEP
*STATIC
*CLOAD
174,3,-1.041666666667
22,3,-1.041666666667
2113,3,-2.083333333333
182,3,-2.083333333333
473,3,2.083333333333
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555,3,2.083333333333
*NODE FILE,GLOBAL=YES
U,RF
*EL FILE
S
*END STEP
