*HEADING
Model: LiftingBeamS8
**
** COORDINATES
**
*NODE, NSET=NALL
       1,  -90.000000    ,   1200.0000    ,  -76.000000
       2,   90.000000    ,   1200.0000    ,  -76.000000
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**
** ELEMENT TOPOLOGY
**
*Shell Section, elset=S2   , material=M2
   16.00
*ELEMENT, TYPE=S8 ,ELSET=S2
       1,       2,      81,    1597,     374,      80,    1617,    1618,     373
       2,    1597,      81,       3,      84,    1617,      82,      83,    1619
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*Shell Section, elset=S1   , material=M1
   20.00
*ELEMENT, TYPE=S8 ,ELSET=S1
      38,      22,     151,    1674,    1538,     150,    1704,    1705,    1539
      39,      25,     168,    1675,     165,     167,    1706,    1707,     166
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*Shell Section, elset=S5   , material=M5
   8.000
*ELEMENT, TYPE=S8 ,ELSET=S5
     263,       1,     335,    2211,     332,     334,    2227,    2228,     333
     264,      47,     350,    2212,     347,     349,    2229,    2230,     348
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*Shell Section, elset=S3   , material=M3
   9.500
*ELEMENT, TYPE=S8 ,ELSET=S3
     315,      49,     391,    2325,     356,     390,    2330,    2331,     357
     316,      53,     398,    2326,     395,     397,    2332,    2333,     396
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*Shell Section, elset=S4   , material=M4
   6.000
*ELEMENT, TYPE=S8 ,ELSET=S4
     914,      63,     934,    3714,    1556,     933,    3728,    3729,    1557
     915,      64,     941,    3715,     938,     940,    3730,    3731,     939
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*Shell Section, elset=S3   , material=M3
   9.500
*ELEMENT, TYPE=S8 ,ELSET=S3
    1418,      63,     934,    4998,    1562,     933,    5009,    5010,    1563
    1419,      64,    1127,    4999,     938,    1126,    5011,    5012,     939
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*Shell Section, elset=S5   , material=M5
   8.000
*ELEMENT, TYPE=S8 ,ELSET=S5
    1974,      55,    1498,    6258,    1501,    1499,    6274,    6275,    1500
    1975,      13,    1483,    6259,    1486,    1484,    6276,    6277,    1485
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*Shell Section, elset=S2   , material=M2
   16.00
*ELEMENT, TYPE=S8 ,ELSET=S2
    2026,      13,     119,    6372,    1483,     118,    6391,    6392,    1484
    2027,    6372,     119,      14,     122,    6391,     120,     121,    6393
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**
** MATERIAL PROPERTIES
**
**
**
**  Steel
**
**
** M1
*MATERIAL, NAME=M1
*ELASTIC, TYPE=ISOTROPIC
    210000.    ,  0.30000
*DENSITY
   0.785000E-08,
*EXPANSION, TYPE=ISO
   0.120000E-04,
**
**
**  Steel
**
**
** M3
*MATERIAL, NAME=M2
*ELASTIC, TYPE=ISOTROPIC
    210000.    ,  0.30000
*DENSITY
   0.785000E-08,
*EXPANSION, TYPE=ISO
   0.120000E-04,
**
**
**  Steel
**
**
** M5
*MATERIAL, NAME=M3
*ELASTIC, TYPE=ISOTROPIC
    210000.    ,  0.30000
*DENSITY
   0.785000E-08,
*EXPANSION, TYPE=ISO
   0.120000E-04,
**
**
**  Steel
**
**
** M7
*MATERIAL, NAME=M4
*ELASTIC, TYPE=ISOTROPIC
    210000.    ,  0.30000
*DENSITY
   0.785000E-08,
*EXPANSION, TYPE=ISO
   0.120000E-04,
**
**
**  Steel
**
**
** M10
*MATERIAL, NAME=M5
*ELASTIC, TYPE=ISOTROPIC
    210000.    ,  0.30000
*DENSITY
   0.785000E-08,
*EXPANSION, TYPE=ISO
   0.120000E-04,
**
** EARTH SPRINGS
**
**
** FIXED FREEDOMS
**
*BOUNDARY
      77, 1, 2
      78, 1
      78, 3
      79, 1
      79, 3
*Step
*BUCKLE
    5,
**
** LOADS
**
**
**
**  Load  Case
**     1   1 Point P0H2 Trans GLOB   F1=0.0 F2=0.0 F3=33334.
**
*Cload,OP=NEW
     77,3,   33334.000
**
**
**  Load  Case
**     2   1 Point P022 Trans GLOB   F1=0.0 F2=0.0 F3=33333.
**
     36,3,   33333.000
**
**
**  Load  Case
**     3   1 Point P01W Trans GLOB   F1=0.0 F2=0.0 F3=33333.
**
     35,3,   33333.000
**
**
**  Load  Case
**     4   1 Point P83  Trans GLOB   F1=0.0 F2=0.0 F3=-12500.
**
     19,3,  -12500.000
**
**
**  Load  Case
**     5   1 Point P82  Trans GLOB   F1=0.0 F2=0.0 F3=-12500.
**
     18,3,  -12500.000
**
**
**  Load  Case
**     6   1 Point P81  Trans GLOB   F1=0.0 F2=0.0 F3=-12500.
**
     17,3,  -12500.000
**
**
**  Load  Case
**     7   1 Point P90  Trans GLOB   F1=0.0 F2=0.0 F3=-12500.
**
     20,3,  -12500.000
**
**
**  Load  Case
**     8   1 Point P37  Trans GLOB   F1=0.0 F2=0.0 F3=-12500.
**
      8,3,  -12500.000
**
**
**  Load  Case
**     9   1 Point P38  Trans GLOB   F1=0.0 F2=0.0 F3=-12500.
**
      9,3,  -12500.000
**
**
**  Load  Case
**    10   1 Point P36  Trans GLOB   F1=0.0 F2=0.0 F3=-12500.
**
      7,3,  -12500.000
**
**
**  Load  Case
**    11   1 Point P45  Trans GLOB   F1=0.0 F2=0.0 F3=-12500.
**
     10,3,  -12500.000
** OUTPUT REQUESTS
**
*EL PRINT, ELSET=S2
S
*EL PRINT, ELSET=S1
S
*EL PRINT, ELSET=S5
S
*EL PRINT, ELSET=S3
S
*EL PRINT, ELSET=S4
S
*NODE FILE
U, RF
*EL FILE
S
*End Step
