**Single Bolt model
*NODE
    2,  -100.0         ,  0.0            ,  7.76000023
    3,  -98.7050018    ,  0.0            ,  7.76000023
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**HWCOLOR COMP          6    25
*ELEMENT,TYPE=C3D8,ELSET=B
    1,        16,         9,         8,        17,       186,       179,       178,
    187
    2,        17,         8,         7,        18,       187,       178,       177,
    188
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**HWCOLOR COMP          7    49
*ELEMENT,TYPE=C3D8,ELSET=W
    61897,      3366,      3365,      3364,      3367,      3486,      3485,      3484,
    3487
    61898,      3367,      3364,      3363,      3368,      3487,      3484,      3483,
    3488
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**HWCOLOR COMP          8    37
*ELEMENT,TYPE=C3D8,ELSET=P2
    42072,     24339,     24428,     24429,     24341,      8061,      8063,      8066,
    8058
    42071,     24341,     24429,     24426,     24335,      8058,      8066,      8056,
    8054
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**HWCOLOR COMP          9    59
*ELEMENT,TYPE=C3D8,ELSET=P1
    62281,     73258,     73265,     73270,     73241,     73090,     73097,     73102,
    73073
    62282,     73241,     73270,     73272,     73242,     73073,     73102,     73104,
    73074
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**HMTAG 1,72471,1,3,Pretension_Node__72471,
**HMTAG 2,72472,1,4,Pretension_Node__72472,
*SOLID SECTION, ELSET=B, MATERIAL=M_STEEL
    ,
*SOLID SECTION, ELSET=P1, MATERIAL=M_STEEL
    ,
*SOLID SECTION, ELSET=P2, MATERIAL=M_STEEL
    ,
*SOLID SECTION, ELSET=W, MATERIAL=M_STEEL
    ,
*ELSET, ELSET=B01-S3_S4
    469,       470,       471,       484,       485,       486
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*ELSET, ELSET=B01-S3_S5
    472,       473,       474,       487,       488,       489
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*ELSET, ELSET=B02-H2_S1
*ELSET, ELSET=B02-S3_S4
*ELSET, ELSET=B02-S3_S5
*ELSET, ELSET=Bolt1_Master_2_S2
*ELSET, ELSET=Bolt1_Master_2_S4
*ELSET, ELSET=Bolt1_Slave_2_S1
    41071,     41072,     41073,     41074,     41075,     41076
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**ELSET, ELSET=Bolt2_Master_2_S2
**ELSET, ELSET=Bolt2_Master_2_S5
**ELSET, ELSET=Bolt2_Slave_2_S1
**-----Boundary condition
*NSET, NSET=BC1
*NSET, NSET=NEW_BC
    83974, 83975, 83976, 83977, 83978, 83979
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*ELSET, ELSET=B01-H2_S2, GENERATE
    889,       972,         1
**ELSET, ELSET=B01-M3_S1, GENERATE
**      5617,      5760,         1
*ELSET, ELSET=B01-PR_S1, GENERATE
    1669,      1752,         1
*ELSET, ELSET=B01-T2_S1, GENERATE
    2653,      2712,         1
**ELSET, ELSET=B02-M3_S1, GENERATE
**     17929,     18072,         1
**ELSET, ELSET=B02-PR_S2, GENERATE
**      4297,      4380,         1
**ELSET, ELSET=B02-T2_S2, GENERATE
**     5305,      5364,         1
*ELSET, ELSET=Bolt1_Master_0_S1, GENERATE
    61897,     61992,         1
*ELSET, ELSET=Bolt1_Master_1_S2, GENERATE
    30979,     31050,         1
**ELSET, ELSET=Bolt1_Master_2_S5, GENERATE
**      5737,      5760,         1
*ELSET, ELSET=Bolt1_Slave_0_S2, GENERATE
    397,       468,         1
*ELSET, ELSET=Bolt1_Slave_1_S2, GENERATE
    61993,     62088,         1
**ELSET, ELSET=Bolt2_Master_0_S1, GENERATE
**     62089,     62184,         1
**ELSET, ELSET=Bolt2_Master_1_S2, GENERATE
**53095,     53166,         1
**ELSET, ELSET=Bolt2_Master_2_S4, GENERATE
**     18049,     18072,         1
**ELSET, ELSET=Bolt2_Slave_0_S2, GENERATE
**      3109,      3180,         1
**ELSET, ELSET=Bolt2_Slave_1_S2, GENERATE
**    62185,     62280,         1
**
**>>>>>>>>>>>>>>>>>>>>>>>>>>>>>>>>>>>>>>
**HM_FORMULA_SET
*NSET, NSET=BC2, GENERATE
    72120,     72470,         1
**-----Element set creation
**-----Material assignment
** Section: Section-2-PLATE01
** Section: Section-3-PLATE02
** Section: Section-4-WASHER
*MATERIAL, NAME=M_STEEL
*DENSITY
    7.8330E-09,0.0
*ELASTIC, TYPE = ISOTROPIC
    200000.0  ,0.3       ,0.0
*SURFACE INTERACTION, NAME = BOLTED_JOINTS
    1.0       ,
*SURFACE BEHAVIOR, PRESSURE-OVERCLOSURE = LINEAR
    1000000.0 ,
*FRICTION
    0.1       ,1000.0    ,0.0       ,0.0
** Interaction: BOLTED_JOINTS-3
**HMNAME GROUPS         24 HM_ContactPair_BOLTED_JOINTS
**CONTACT PAIR, INTERACTION=BOLTED_JOINTS, ADJUST=0.0, TYPE=SURFACE TO SURFACE, SMALL SLIDING
**B01-S3,B01-M3
** Interaction: BOLTED_JOINTS-4
**HMNAME GROUPS         25 HM_ContactPair_BOLTED_JOINTS:1
*Elset, elset=_Bottom_Plate_Master_S2
    65182, 65183, 65184, 65185, 65186, 65187
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*Elset, elset=_Bottom_Plate_Master_S4
    62305, 62306, 62307, 62308, 62309, 62310
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*Elset, elset=_Bottom_Plate_Master_S5, generate
    62593,  62616,      1
*Surface, type=ELEMENT, name=Bottom_Plate_Master
    _Bottom_Plate_Master_S2, S2
    _Bottom_Plate_Master_S4, S4
    _Bottom_Plate_Master_S5, S5
*Elset, elset=_Top_Plate_Slave_S1
    41071, 41072, 41073, 41074, 41075, 41076
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*Surface, type=ELEMENT, name=Top_Plate_Slave
    _Top_Plate_Slave_S1, S1
*CONTACT PAIR, INTERACTION=BOLTED_JOINTS, ADJUST=0.0, TYPE=SURFACE TO SURFACE, SMALL SLIDING
    Bolt1_Slave_0,Bolt1_Master_0
** Interaction: BOLTED_JOINTS-5
**HMNAME GROUPS         26 HM_ContactPair_BOLTED_JOINTS:2
*CONTACT PAIR, INTERACTION=BOLTED_JOINTS, ADJUST=0.0, TYPE=SURFACE TO SURFACE, SMALL SLIDING
    Bolt1_Slave_1,Bolt1_Master_1
** Interaction: BOLTED_JOINTS-6
**HMNAME GROUPS         27 HM_ContactPair_BOLTED_JOINTS:3
*CONTACT PAIR, INTERACTION=BOLTED_JOINTS, ADJUST=0.0, TYPE=SURFACE TO SURFACE, SMALL SLIDING
    Top_Plate_Slave,Bottom_Plate_Master
**HMNAME GROUPS         28 HM_ContactPair_BOLTED_JOINTS:4
**CONTACT PAIR, INTERACTION=BOLTED_JOINTS, ADJUST=0.0, TYPE=SURFACE TO SURFACE, SMALL SLIDING
**Bolt2_Slave_2,Bolt2_Master_2
***********************************************
** Interaction: BOLTED_JOINTS-2
**HMNAME GROUPS         23 HM_ContactPair_BOLTED_JOINTS:5
**CONTACT PAIR, INTERACTION=BOLTED_JOINTS, ADJUST=0.0, TYPE=SURFACE TO SURFACE, SMALL SLIDING
**Bolt1_Slave_0,Bolt1_Master_0
**-----
**---------------------------------------
*****************************************
*SURFACE, NAME = B01-H2, TYPE = ELEMENT
    B01-H2_S2,S2
**-----Bolt1, Master Surface 0-----------
*****************************************
*SURFACE, NAME = Bolt1_Master_0, TYPE = ELEMENT
    Bolt1_Master_0_S1,S1
**-----Bolt1, Master Surface 1-----------
*****************************************
*SURFACE, NAME = Bolt1_Master_1, TYPE = ELEMENT
    Bolt1_Master_1_S2,S2
**-----Bolt1, Master Surface 2-----------
*****************************************
**SURFACE, NAME = Bolt1_Master_2, TYPE = ELEMENT
**Bolt1_Master_2_S2,S2
**Bolt1_Master_2_S4,S4
**Bolt1_Master_2_S5,S5
**-----Master Surface 4
*****************************************
**SURFACE, NAME = B01-M3, TYPE = ELEMENT
**B01-M3_S1,S1
**-----Pretension surface 1
*SURFACE, NAME = B01-PR, TYPE = ELEMENT
    B01-PR_S1,S1
**-----Slave surface 1
*SURFACE, NAME = Bolt1_Slave_0, TYPE = ELEMENT
    Bolt1_Slave_0_S2,S2
**-----Slave surface 2
*SURFACE, NAME = Bolt1_Slave_1, TYPE = ELEMENT
    Bolt1_Slave_1_S2,S2
*SURFACE, NAME = Bolt1_Slave_2, TYPE = ELEMENT
    Bolt1_Slave_2_S1,S1
*SURFACE, NAME = B01-S3, TYPE = ELEMENT
    B01-S3_S4,S4
    B01-S3_S5,S5
*SURFACE, NAME = B01-T2, TYPE = ELEMENT
    B01-T2_S1,S1
**SURFACE, NAME = B02-H2, TYPE = ELEMENT
**B02-H2_S1,S1
**SURFACE, NAME = Bolt2_Master_0, TYPE = ELEMENT
**Bolt2_Master_0_S1,S1
**SURFACE, NAME = Bolt2_Master_1, TYPE = ELEMENT
**Bolt2_Master_1_S2,S2
**SURFACE, NAME = Bolt2_Master_2, TYPE = ELEMENT
**Bolt2_Master_2_S2,S2
**Bolt2_Master_2_S4,S4
**Bolt2_Master_2_S5,S5
**SURFACE, NAME = B02-M3, TYPE = ELEMENT
**B02-M3_S1,S1
**SURFACE, NAME = B02-PR, TYPE = ELEMENT
**B02-PR_S2,S2
***SURFACE, NAME = Bolt2_Slave_0, TYPE = ELEMENT
**Bolt2_Slave_0_S2,S2
**SURFACE, NAME = Bolt2_Slave_1, TYPE = ELEMENT
**Bolt2_Slave_1_S2,S2
**SURFACE, NAME = Bolt2_Slave_2, TYPE = ELEMENT
**Bolt2_Slave_2_S1,S1
**********************************************
**SURFACE, NAME = B02-S3, TYPE = ELEMENT
**B02-S3_S4,S4
**B02-S3_S5,S5
**SURFACE, NAME = B02-T2, TYPE = ELEMENT
**B02-T2_S2,S2
** Pre-Tension Section for Bolt Load: SURFBOLTLOAD-1
**HMNAME GROUPS         31 31
**PRE-TENSION SECTION, NODE=72471, SURFACE=B02-PR
**0.0       ,0.0       ,-1.0
** Pre-Tension Section for Bolt Load: SURFBOLTLOAD-2
**HMNAME GROUPS         32 32
*PRE-TENSION SECTION, NODE=72472, SURFACE=B01-PR
    0.0       ,0.0       ,1.0
** Constraint: BOLT_TIE-1
********************************************************
*Elset, elset=_Slave_Thread_S4
    469, 470, 471, 484, 485, 486
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*Elset, elset=_Slave_Thread_S5
    472, 473, 474, 487, 488, 489
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*Surface, type=ELEMENT, name=Slave_Thread
    _Slave_Thread_S4, S4
    _Slave_Thread_S5, S5
*Elset, elset=_Master_Thread_S1, generate
    62473,  62616,      1
*Surface, type=ELEMENT, name=Master_Thread
    _Master_Thread_S1, S1
** Constraint: BOLT_TIE-2
*TIE, NAME = BOLT_TIE-1, POSITION TOLERANCE = 1.0
    Slave_Thread,Master_Thread
********************************************************
**TIE, NAME = BOLT_TIE-2, POSITION TOLERANCE = 1.0
**B02-S3,B02-M3
**HWNAME LOADCOL          1 HM_IC_Load_Cols_1
**HWCOLOR LOADCOL          1     3
*BOUNDARY
    NEW_BC,1,3,
**HMNAME LOADSTEP          1 HM_Step_1
********************************************************
*STEP, INC =          100
*STATIC
    0.1       ,1.0       ,          ,
**HWNAME LOADCOL          2 HM_Load_Cols_2
**HWCOLOR LOADCOL          2     4
*CLOAD
    72472,1,52000.0
*NODE FILE
    U
*EL FILE
    S,E
*CONTACT FILE
    CDIS,CSTR,CELS
*CONTACT PRINT, FREQUENCY = 10, TOTALS = YES
    CSTRESS, CDISP,CELS
*PRINT, CONTACT = YES
*END STEP
**HMNAME LOADSTEP          2 HM_Step_2
*****
