*HEADING
Model: TEST Date: 23/02/2010  23:03:22
**
** COORDINATES
**
*NODE, NSET=NALL
       1,   20.000000    ,   0.0000000    ,   0.0000000
       2,   0.0000000    ,   20.000000    ,   0.0000000
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**
** TRANSFORMATIONS
**
*NSET, NSET=T1
       1,       2,       3,       4,      27,      28,      29,      30,
      31,      32
*TRANSFORM, NSET=T1    , TYPE=C
  0.0000    ,  0.0000    ,  0.0000    ,  0.0000    ,  0.0000    ,  10.000
**
** ELEMENT TOPOLOGY
**
*Solid Section, elset=E1   , material=M1
   1.000
*ELEMENT, TYPE=CPS8  ,ELSET=E1
       1,       1,      31,      33,       6,      30,      38,      39,       5
       2,      31,       3,      17,      33,      32,      16,      40,      38
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**
** MATERIAL PROPERTIES
**
**
** M1
*MATERIAL, NAME=M1
*ELASTIC, TYPE=ISOTROPIC
    200000.    ,  0.30000
*DENSITY
   0.785000E-08,
*EXPANSION, TYPE=ISO
   0.120000E-04,
**
** EARTH SPRINGS
**
**
** FIXED FREEDOMS
**
*BOUNDARY
       1, 2, 3
       2, 3
       3, 2, 3
       4, 3
      27, 3
      28, 3
      29, 3
      30, 2, 3
      31, 2, 3
      32, 2, 3
*INITIAL CONDITIONS,TYPE=TEMPERATURE
Nall, 0.0
**
** LOADING
**
*Step
**Case    1  p1
*Static, SOLVER=SPOOLES
1.0, 1.0, 1e-05, 1.0
**
** LOADS
**
**
**
**  Load  Case
**     1   1 Line  L1   , traction      0.0 , Pressure  1.
**
*Cload,OP=NEW
      1,1,  0.87761913
      1,2,  0.48793601E-03
      2,1,  0.87761913
      2,2, -0.48793601E-03
      5,1,   3.4509205
      5,2,  0.45432230
      6,1,   1.6954300
      6,2,  0.45428909
      7,1,   3.2157460
      7,2,   1.3320056
      8,1,   1.5200809
      8,2,  0.87761913
      9,1,   2.7614237
      9,2,   2.1189149
     10,1,   1.2411409
     10,2,   1.2411409
     11,1,   2.1189149
     11,2,   2.7614237
     12,1,  0.87761913
     12,2,   1.5200809
     13,1,   1.3320056
     13,2,   3.2157460
     14,1,  0.45428909
     14,2,   1.6954300
     15,1,  0.45432230
     15,2,   3.4509205
** OUTPUT REQUESTS
**
*El Print
S
*Node Print
U, RF
*NODE FILE
U, RF
*EL FILE,POSITION=AVERAGED AT NODES,GLOBAL=YES
S
*End Step
