** Generated by Mecway 11.0
*NODE
1,0.05,0.05,0
2,-0.05,0.05,0
3,0.05,-0.05,0
4,-0.05,-0.05,0
5,0.04,0.05,0
6,0.03,0.05,0
7,0.02,0.05,0
8,0.01,0.05,0
9,0,0.05,0
10,-0.01,0.05,0
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*ELEMENT,TYPE=C3D8
1,100,101,112,111,332,322,212,222
2,332,322,212,222,333,323,213,223
3,333,323,213,223,334,324,214,224
4,334,324,214,224,335,325,215,225
5,335,325,215,225,336,326,216,226
6,336,326,216,226,337,327,217,227
7,337,327,217,227,338,328,218,228
8,338,328,218,228,339,329,219,229
9,339,329,219,229,340,330,220,230
10,340,330,220,230,341,331,221,231
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*ELEMENT,TYPE=SPRINGA
1001,1332,1333
1002,1332,1334
1003,1332,1335
*NSET,NSET=node-Loc
1332
*NSET,NSET=node-X
1333
*NSET,NSET=node-Y
1334
*NSET,NSET=node-Z
1335
*NSET,NSET=node-Ind
171
661
761
1251
1301
1311
1321
1331
*NSET,NSET=node-Reaction-Fr-RH
1
*NSET,NSET=node-Reaction-Fr-LH
2
*NSET,NSET=node-Reaction-Rr-LH
4
*NSET,NSET=node-Reaction-Rr-RH
3
*ELSET,ELSET=spring-elem
1001
1002
1003
*ELSET,ELSET=Default
1
2
3
4
5
6
7
8
9
10
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*ELSET,ELSET=1
1001
*ELSET,ELSET=2
1002
*ELSET,ELSET=3
1003
*ELSET,ELSET=EAll
1
2
3
4
5
6
7
8
9
10
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*MATERIAL,NAME=Material
*ELASTIC,TYPE=ISOTROPIC
200000000000,0.3
*DENSITY
7850
*SOLID SECTION,ELSET=Default,MATERIAL=Material
*BOUNDARY
1,1,,0
1,2,,0
1,3,,0
2,1,,0
2,2,,0
2,3,,0
3,1,,0
3,2,,0
3,3,,0
4,1,,0
4,2,,0
4,3,,0
**********************************
******  E Q U A T I O N S   ******
**********************************
*EQUATION
9
1333,1,-1.0,
171,1,0.125,661,1,0.125,761,1,0.125,1251,1,0.125,
1301,1,0.125,1311,1,0.125,1321,1,0.125,1331,1,0.125
*EQUATION
9
1333,2,-1.0,
171,2,0.125,661,2,0.125,761,2,0.125,1251,2,0.125,
1301,2,0.125,1311,2,0.125,1321,2,0.125,1331,2,0.125
*EQUATION
9
1333,3,-1.0,
171,3,0.125,661,3,0.125,761,3,0.125,1251,3,0.125,
1301,3,0.125,1311,3,0.125,1321,3,0.125,1331,3,0.125
*EQUATION
9
1334,1,-1.0,
171,1,0.125,661,1,0.125,761,1,0.125,1251,1,0.125,
1301,1,0.125,1311,1,0.125,1321,1,0.125,1331,1,0.125
*EQUATION
9
1334,2,-1.0,
171,2,0.125,661,2,0.125,761,2,0.125,1251,2,0.125,
1301,2,0.125,1311,2,0.125,1321,2,0.125,1331,2,0.125
*EQUATION
9
1334,3,-1.0,
171,3,0.125,661,3,0.125,761,3,0.125,1251,3,0.125,
1301,3,0.125,1311,3,0.125,1321,3,0.125,1331,3,0.125
*EQUATION
9
1335,1,-1.0,
171,1,0.125,661,1,0.125,761,1,0.125,1251,1,0.125,
1301,1,0.125,1311,1,0.125,1321,1,0.125,1331,1,0.125
*EQUATION
9
1335,2,-1.0,
171,2,0.125,661,2,0.125,761,2,0.125,1251,2,0.125,
1301,2,0.125,1311,2,0.125,1321,2,0.125,1331,2,0.125
*EQUATION
9
1335,3,-1.0,
171,3,0.125,661,3,0.125,761,3,0.125,1251,3,0.125,
1301,3,0.125,1311,3,0.125,1321,3,0.125,1331,3,0.125
*SPRING,ELSET=spring-elem

1000000000.0
*ELEMENT,TYPE=MASS,ELSET=Mass-Point
1004,1332
*MASS,ELSET=Mass-Point
1.0
**
*STEP
*STATIC
*DLOAD
EAll,GRAV,0,1,0,0
*DLOAD
EAll,GRAV,0,0,1,0
*DLOAD
EAll,GRAV,-9.81,0,0,1
*NODE FILE,GLOBAL=YES
U,RF
*EL FILE
S,E,ENER
*DLOAD
Mass-Point,GRAV,-9.81,0,0,1
*NODE PRINT,NSET=node-Reaction-Fr-LH
RF
*NODE PRINT,NSET=node-Reaction-Fr-RH
RF
*NODE PRINT,NSET=node-Reaction-Rr-LH
RF
*NODE PRINT,NSET=node-Reaction-Rr-RH
RF
*END STEP
