*HEADING
*NODE, NSET=NALL
      1,           0., -0.0763406008,  0.186220005
      2,           0., -0.0820232034,   0.19625999
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**  ----------------------------------------------
*Element, type=C3D8, elset=ETIRE
    1,   501,   502,   517,   516,     1,     2,    17,    16
    2,   502,   503,   518,   517,     2,     3,    18,    17
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**  --------------------------------------------------
*ELSET,ELSET=TREAD
    10,    11,    12,    13,    14,    24
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*ELSET,ELSET=SIDE
     1,     2,     3,     4,     5,     6
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*Elset, elset=_BEAD_S3
     1,   501,  1001,  1501,  2001,  2501
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*Surface, type=ELEMENT, name=BEAD
_BEAD_S3, S3
*Elset, elset=_INSIDE_S5
    15,    16,    17,    18,    19,    20
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*Surface, type=ELEMENT, name=INSIDE
_INSIDE_S5, S5
*Elset, elset=_SIDE_S3
     2,     3,     4,     5,     6,     7
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*Surface, type=ELEMENT, name=SIDE
_SIDE_S3, S3
*Elset, elset=_TREAD_S3
    10,    11,    12,    13,    14,   510
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*Surface, type=ELEMENT, name=TREAD
_TREAD_S3, S3
** 拌魂阑 困茄 ELSET
*ELSET,ELSET=EL_1
1, 501, 1001, 1501, 2001, 2501
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*ELSET,ELSET=EL_2
2, 502, 1002, 1502, 2002, 2502
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*ELSET,ELSET=EL_3
3, 503, 1003, 1503, 2003, 2503
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*ELSET,ELSET=EL_4
4, 504, 1004, 1504, 2004, 2504
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*ELSET,ELSET=EL_5
5, 505, 1005, 1505, 2005, 2505
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*ELSET,ELSET=EL_6
6, 506, 1006, 1506, 2006, 2506
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*ELSET,ELSET=EL_7
7, 507, 1007, 1507, 2007, 2507
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*ELSET,ELSET=EL_8
8, 508, 1008, 1508, 2008, 2508
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*ELSET,ELSET=EL_9
9, 509, 1009, 1509, 2009, 2509
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*ELSET,ELSET=EL_10
10, 510, 1010, 1510, 2010, 2510
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*ELSET,ELSET=EL_11
11, 511, 1011, 1511, 2011, 2511
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*ELSET,ELSET=EL_12
12, 512, 1012, 1512, 2012, 2512
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*ELSET,ELSET=EL_13
13, 513, 1013, 1513, 2013, 2513
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*ELSET,ELSET=EL_14
14, 514, 1014, 1514, 2014, 2514
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*ELSET,ELSET=EL_15
15, 515, 1015, 1515, 2015, 2515
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*ELSET,ELSET=EL_15014
15014, 15514, 16014, 16514, 17014, 17514
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*ELSET,ELSET=EL_15013
15013, 15513, 16013, 16513, 17013, 17513
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*ELSET,ELSET=EL_15012
15012, 15512, 16012, 16512, 17012, 17512
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*ELSET,ELSET=EL_15011
15011, 15511, 16011, 16511, 17011, 17511
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*ELSET,ELSET=EL_15010
15010, 15510, 16010, 16510, 17010, 17510
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*ELSET,ELSET=EL_15009
15009, 15509, 16009, 16509, 17009, 17509
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*ELSET,ELSET=EL_15008
15008, 15508, 16008, 16508, 17008, 17508
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*ELSET,ELSET=EL_15007
15007, 15507, 16007, 16507, 17007, 17507
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*ELSET,ELSET=EL_15006
15006, 15506, 16006, 16506, 17006, 17506
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*ELSET,ELSET=EL_15005
15005, 15505, 16005, 16505, 17005, 17505
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*ELSET,ELSET=EL_15004
15004, 15504, 16004, 16504, 17004, 17504
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*ELSET,ELSET=EL_15003
15003, 15503, 16003, 16503, 17003, 17503
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*ELSET,ELSET=EL_15002
15002, 15502, 16002, 16502, 17002, 17502
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*ELSET,ELSET=EL_15001
15001, 15501, 16001, 16501, 17001, 17501
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*ELSET,ELSET=EL_15
15, 515, 1015, 1515, 2015, 2515
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*ELSET,ELSET=EL_16
16, 516, 1016, 1516, 2016, 2516
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*ELSET,ELSET=EL_17
17, 517, 1017, 1517, 2017, 2517
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*ELSET,ELSET=EL_18
18, 518, 1018, 1518, 2018, 2518
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*ELSET,ELSET=EL_19
19, 519, 1019, 1519, 2019, 2519
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*ELSET,ELSET=EL_20
20, 520, 1020, 1520, 2020, 2520
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*ELSET,ELSET=EL_21
21, 521, 1021, 1521, 2021, 2521
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*ELSET,ELSET=EL_22
22, 522, 1022, 1522, 2022, 2522
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*ELSET,ELSET=EL_23
23, 523, 1023, 1523, 2023, 2523
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*ELSET,ELSET=EL_24
24, 524, 1024, 1524, 2024, 2524
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*ELSET,ELSET=EL_25
25, 525, 1025, 1525, 2025, 2525
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*ELSET,ELSET=EL_26
26, 526, 1026, 1526, 2026, 2526
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*ELSET,ELSET=EL_27
27, 527, 1027, 1527, 2027, 2527
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*ELSET,ELSET=EL_28
28, 528, 1028, 1528, 2028, 2528
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*ELSET,ELSET=EL_15027
15027, 15527, 16027, 16527, 17027, 17527
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*ELSET,ELSET=EL_15026
15026, 15526, 16026, 16526, 17026, 17526
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*ELSET,ELSET=EL_15025
15025, 15525, 16025, 16525, 17025, 17525
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*ELSET,ELSET=EL_15024
15024, 15524, 16024, 16524, 17024, 17524
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*ELSET,ELSET=EL_15023
15023, 15523, 16023, 16523, 17023, 17523
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*ELSET,ELSET=EL_15022
15022, 15522, 16022, 16522, 17022, 17522
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*ELSET,ELSET=EL_15021
15021, 15521, 16021, 16521, 17021, 17521
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*ELSET,ELSET=EL_15020
15020, 15520, 16020, 16520, 17020, 17520
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*ELSET,ELSET=EL_15019
15019, 15519, 16019, 16519, 17019, 17519
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*ELSET,ELSET=EL_15018
15018, 15518, 16018, 16518, 17018, 17518
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*ELSET,ELSET=EL_15017
15017, 15517, 16017, 16517, 17017, 17517
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*ELSET,ELSET=EL_15016
15016, 15516, 16016, 16516, 17016, 17516
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*ELSET,ELSET=EL_15015
15015, 15515, 16015, 16515, 17015, 17515
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**  -----------------------------------------
*SOLID SECTION,ELSET=TREAD,MATERIAL=RUBBER
*SOLID SECTION,ELSET=SIDE,MATERIAL=RUBBER
*PHYSICAL CONSTANTS,STEFANB=5.6697E-8,ABSOLUTE ZERO = -273.15
*MATERIAL,NAME=RUBBER
*Conductivity
 0.245854,
*Density
1100.,
*Hyperelastic, moduli=LONG TERM
 1e+06,0.,0.
*Viscoelastic, time=PRONY
 0.3,  0., 0.1
*INITIAL CONDITIONS,TYPE=TEMPERATURE
NALL,298.15
*** rolling speed for qdot :  80.0 km/hr
*** rolling freq  for qdot : 12.10 hz
** ==================================================
**
*STEP
*HEAT TRANSFER, STEADY STATE
*FILM
TREAD, F3FC, 298.15., 12000.
*FILM, OP=NEW
SIDE, F3FC, 298.15., 131.111
*FILM, OP=NEW
BEAD, F3FC, 298.15., 88000.
**RADIATE, OP=NEW
*DFLUX, OP=NEW
EL_1, BF, 187.69583416387
EL_2, BF, 32289.0296306201
EL_3, BF, 28858.2362992888
EL_4, BF, 17953.1761518304
EL_5, BF, 22892.9215197
EL_6, BF, 38278.1693284106
EL_7, BF, 45248.8116162441
EL_8, BF, 43944.3496800515
EL_9, BF, 21354.7710983239
EL_10, BF, 9681.93554890114
EL_11, BF, 21120.233177335
EL_12, BF, 87024.7614990697
EL_13, BF, 196026.22616169
EL_14, BF, 196341.459704899
EL_15013, BF, 196026.22616169
EL_15012, BF, 87024.7614990697
EL_15011, BF, 21120.233177335
EL_15010, BF, 9681.93554890114
EL_15009, BF, 21354.7710983239
EL_15008, BF, 43944.3496800515
EL_15007, BF, 45248.8116162441
EL_15006, BF, 38278.1693284106
EL_15005, BF, 22892.9215197
EL_15004, BF, 17953.1761518304
EL_15003, BF, 28858.2362992888
EL_15002, BF, 32289.0296306201
EL_15001, BF, 187.69583416387
EL_15, BF, 9154.95574216848
EL_16, BF, 386.17570213993
EL_17, BF, 11215.2276302841
EL_18, BF, 26238.4994395808
EL_19, BF, 63175.3918334063
EL_20, BF, 87505.8606235064
EL_21, BF, 81784.7870945445
EL_22, BF, 44090.4843778277
EL_23, BF, 20530.4620326504
EL_24, BF, 11670.2141149627
EL_25, BF, 9841.15572121675
EL_26, BF, 15299.763653844
EL_27, BF, 17849.7238204636
EL_28, BF, 26985.4765863572
EL_15027, BF, 17849.7238204636
EL_15026, BF, 15299.763653844
EL_15025, BF, 9841.15572121675
EL_15024, BF, 11670.2141149627
EL_15023, BF, 20530.4620326504
EL_15022, BF, 44090.4561811892
EL_15021, BF, 81784.7870945445
EL_15020, BF, 87505.8606235064
EL_15019, BF, 63175.3918334063
EL_15018, BF, 26238.4994395808
EL_15017, BF, 11215.2276302841
EL_15016, BF, 386.17570213993
EL_15015, BF, 9154.95574216848
***OUTPUT, FIELD, FREQUENCY=99
***Element Output,ELSET=ETIRE, POSITION=CENTROIDAL
**TEMP
*NODE OUTPUT, NSET=NALL
NT
***OUTPUT,HISTORY,VAR=PRESELECT,FREQ=1
***EL FILE, ELSET=ETIRE, POSITION=CENTROIDAL
**TEMP
*NODE FILE, NSET=NALL
NT
*END STEP
