*HEADING
Model: TransformHinge
**
** COORDINATES
**
*NODE, NSET=NALL
       1,   10.000000    ,   0.0000000    ,   0.0000000
       2,  0.61230318E-15,   10.000000    ,   0.0000000
       3,  -10.000000    ,   0.0000000    ,   0.0000000
       4,  -15.000000    ,   0.0000000    ,   0.0000000
       5,  -15.000000    ,   10.000000    ,   0.0000000
       6,   40.000000    ,   20.000000    ,   0.0000000
       7,  -5.0000000    ,   20.000000    ,   0.0000000
       8,   40.000000    ,   0.0000000    ,   0.0000000
       9,   9.9144486    ,   1.3052619    ,   0.0000000
      10,   9.6592583    ,   2.5881905    ,   0.0000000
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**
** TRANSFORMATIONS
**
*NSET, NSET=T1
       1,       2,       3,       9,      10,      11,      12,      13,
      14,      15,      16,      17,      18,      19,      20,      21,
      22,      23,      24,      25,      26,      27,      28,      29,
      30
*TRANSFORM, NSET=T1    , TYPE=C
  0.0000    ,  0.0000    ,  0.0000    ,  0.0000    ,  0.0000    ,  100.00
**
** ELEMENT TOPOLOGY
**
*Solid Section, elset=E1   , material=M1
   5.000
*ELEMENT, TYPE=CPS8  ,ELSET=E1
       1,       4,      32,     125,      35,      33,     262,     263,      34
       2,     125,      32,       3,      29,     262,      31,      30,     264
       3,       8,      89,     126,      92,      90,     265,     266,      91
       4,       6,      42,     127,      77,      41,     267,     268,      76
       5,       1,     112,     128,      10,     113,     269,     270,       9
       6,     112,     110,     129,     128,     111,     271,     272,     269
       7,     110,     108,     130,     129,     109,     273,     274,     271
       8,     108,     106,     131,     130,     107,     275,     276,     273
       9,     106,     104,     132,     131,     105,     277,     278,     275
      10,     104,     102,     133,     132,     103,     279,     280,     277
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**
** MATERIAL PROPERTIES
**
**
** M1
*MATERIAL, NAME=M1
*ELASTIC, TYPE=ISOTROPIC
    200000.    ,  0.30000
** FIXED FREEDOMS
**
*BOUNDARY
       1, 1
       2, 1
       3, 1
       6, 1
       8, 1
       9, 1
      10, 1
      11, 1
      12, 1
      13, 1
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
** LOADING
**
*Step
**Case    1  Load
*Static, SOLVER=SPOOLES
1.0, 1.0, 1e-05, 1.0
**
** LOADS
**
**
**
**  Load  Case
**     1   1 Line  L5   , traction      0.0 , Pressure  2.
**
*Cload,OP=NEW
      6,2,  -4.1666669
      7,2,  -4.1666669
     41,2,  -16.666666
     42,2,  -8.3333338
     43,2,  -16.666666
     44,2,  -8.3333338
     45,2,  -16.666666
     46,2,  -8.3333338
     47,2,  -16.666666
     48,2,  -8.3333338
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** OUTPUT REQUESTS
**
*EL FILE
S, U, E
*End Step
