**
** ABAQUS Input Deck Generated by HyperMesh Version  : 13.0.110.31
** Generated using HyperMesh-Abaqus Template Version : 13.0.110
**
**   Template:  ABAQUS/STANDARD 3D
**
*NODE
         1,  25.0           ,  -25.0          ,  2.842170943E-14
         2,  25.0           ,  -15.0          ,  0.0
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**HWCOLOR COMP          1    10
*ELEMENT,TYPE=C3D8R,ELSET=balken
       101,        66,        65,         8,         7,       127,       130,       129,
       128
       102,       127,       130,       129,       128,       131,       134,       133,
       132
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*ELSET, ELSET=HMprop_stahl
       101,       102,       103,       104,       105,       106
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**HM_set_by_property    11          1
*SOLID SECTION, ELSET=HMprop_stahl, MATERIAL=stahl
**HMNAME MATS          1 stahl    11
*MATERIAL, NAME=stahl
*DENSITY
7.8000E-09,0.0
*ELASTIC, TYPE = ISOTROPIC
210000.0  ,0.3       ,0.0
**HMNAME LOADSTEP          1 step
*STEP, INC =          100
*STATIC
**HWNAME LOADCOL          1 bound
**HWCOLOR LOADCOL          1    11
*BOUNDARY
        26,1,6,0.0
        27,1,6,0.0
        28,1,6,0.0
        29,1,6,0.0
        30,1,6,0.0
        31,1,6,0.0
       219,1,6,0.0
       220,1,6,0.0
       223,1,6,0.0
       224,1,6,0.0
       227,1,6,0.0
       228,1,6,0.0
       231,1,6,0.0
       232,1,6,0.0
       235,1,6,0.0
       236,1,6,0.0
       593,1,6,0.0
       594,1,6,0.0
       596,1,6,0.0
       597,1,6,0.0
       599,1,6,0.0
       600,1,6,0.0
       602,1,6,0.0
       603,1,6,0.0
       605,1,6,0.0
       606,1,6,0.0
       712,1,6,0.0
       713,1,6,0.0
       714,1,6,0.0
       715,1,6,0.0
       716,1,6,0.0
       717,1,6,0.0
       718,1,6,0.0
       719,1,6,0.0
       720,1,6,0.0
       721,1,6,0.0
**HWNAME LOADCOL          2 load
**HWCOLOR LOADCOL          2    11
*CLOAD
         1,2,100.0
         2,2,100.0
         3,2,100.0
         4,2,100.0
         5,2,100.0
         6,2,100.0
       697,2,100.0
       698,2,100.0
       699,2,100.0
       700,2,100.0
       701,2,100.0
       702,2,100.0
       703,2,100.0
       704,2,100.0
       705,2,100.0
       706,2,100.0
       722,2,100.0
       723,2,100.0
       724,2,100.0
       725,2,100.0
       726,2,100.0
       727,2,100.0
       728,2,100.0
       729,2,100.0
       730,2,100.0
       731,2,100.0
       732,2,100.0
       733,2,100.0
       734,2,100.0
       735,2,100.0
       736,2,100.0
       737,2,100.0
       738,2,100.0
       739,2,100.0
       740,2,100.0
       741,2,100.0
*NODE PRINT
*EL PRINT
*OUTPUT, FIELD
*NODE OUTPUT, VARIABLE = PRESELECT
U,
*ELEMENT OUTPUT
S,
E,
*NODE PRINT
U,WARP,UR3,UR1,U3,U1,U2,UR2,
*EL PRINT, POSITION = NODES
S11,S22,S33,S12,S13,S23,
E,
*NODE FILE
U,U1,U2,U3,UR1,UR2,UR3,WARP,
*EL FILE
S,
SP,
SINV,
ALPHA,
ALPHAP,
TSHR,
E,
*END STEP
*****
