*SURFACE, NAME = 1plate_contact_surface, TYPE = ELEMENT
1plate, SPOS
*SURFACE, NAME = 2ball_contact_surface, TYPE = ELEMENT
2ball, SPOS
*SURFACE INTERACTION, NAME = 1surface_interaction
*SURFACE BEHAVIOR,PRESSURE-OVERCLOSURE=EXPONENTIAL
1.e-4,.1
*FRICTION
0.1       ,5000.0       ,0.0       ,0.0
*CONTACT PAIR, INTERACTION=1surface_interaction, SMALL SLIDING
1plate_contact_surface, 2ball_contact_surface
*MATERIAL, NAME=steel
*DENSITY
7.8500E-09,0.0
*ELASTIC, TYPE = ISOTROPIC
210000.0  ,0.3       ,0.0
*SHELL SECTION, ELSET=1plate, MATERIAL=steel
1.0       ,
*SHELL SECTION, ELSET=2ball, MATERIAL=steel
1.0       ,
*INITIAL CONDITIONS,TYPE=VELOCITY
nodes_ball,3,-5420.0
*STEP ,INC=40000
*DYNAMIC,DIRECT,EXPLICIT
1.e-4,       1.e-2,          ,
*BOUNDARY
nodes_fixed,1,3,0.0
*NODE FILE
U
*EL FILE
S
*END STEP
*NODE
         1,  0.2678977312914,  -16.48289842535,  11.675588743547
         2,  -13.79491444965,  -14.38313531038,  21.319002091012
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**HWCOLOR COMP          1     3
*ELEMENT,TYPE=S4,ELSET=1plate
         1,         4,        28,        30,        12
         2,        63,        61,        28,         4
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**HWCOLOR COMP          2     4
*ELEMENT,TYPE=S4,ELSET=2ball
        17,        16,        24,        54,        38
        18,        16,        40,        14,        24
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*NSET, NSET=nodes_fixed
        41,        49,        57,        65
*NSET, NSET=nodes_ball
         1,         2,         3,         5,         6,         7
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