** Generated by Mecway 11.0
*NODE
1,0,0,0
2,0.1,0,0
3,0.1,0.1,0
4,0,0.1,0
5,0,0,0.1
6,0.1,0,0.1
7,0.1,0.1,0.1
8,0,0.1,0.1
9,0,0,0.02
10,0,0,0.04
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*ELEMENT,TYPE=C3D8
1,177,211,216,183,178,212,7,184
2,1,41,47,13,9,42,48,14
3,9,42,48,14,10,43,49,15
4,10,43,49,15,11,44,50,16
5,11,44,50,16,12,45,51,17
6,12,45,51,17,5,46,52,18
7,13,47,53,19,14,48,54,20
8,14,48,54,20,15,49,55,21
9,15,49,55,21,16,50,56,22
10,16,50,56,22,17,51,57,23
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*NSET,NSET=fixed
1
4
5
8
9
10
11
12
13
14
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*NSET,NSET=load
261
306
351
396
441
486
531
576
621
666
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*ELSET,ELSET=Default
1
2
3
4
5
6
7
8
9
10
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*MATERIAL,NAME=Material
*ELASTIC,TYPE=ISOTROPIC
200000000000,0.3
*SOLID SECTION,ELSET=Default,MATERIAL=Material
*BOUNDARY
1,1,,0
1,2,,0
1,3,,0
4,1,,0
4,2,,0
4,3,,0
5,1,,0
5,2,,0
5,3,,0
8,1,,0
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*STEP
*STATIC
*CLOAD
261,2,-2.777777777778
306,2,-2.777777777778
351,2,-2.777777777778
396,2,-2.777777777778
441,2,-2.777777777778
486,2,-2.777777777778
531,2,-2.777777777778
576,2,-2.777777777778
621,2,-2.777777777778
666,2,-2.777777777778
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*NODE FILE,GLOBAL=YES
U,RF
*EL FILE
S,E,ENER
*END STEP
