*HEADING
Model: beam_3D-coupling

*NODE, NSET=Nall
       1,6.000000000000e+001,0.000000000000e+000,0.000000000000e+000
       2,5.000000000000e+001,0.000000000000e+000,0.000000000000e+000
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*ELEMENT, TYPE=C3D8, ELSET=Eall
     1,     1,     2,     3,     4,     5,     6,     7,     8
     2,     4,     3,     9,    10,     8,     7,    11,    12
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
** Names based on fix_01
*NSET,NSET=Nfix_01
1,
2,
5,
6,
125,
127,
187,
189,
249,
251,
311,
313,
373,
375,

** Names based on fix_02
*NSET,NSET=Nfix_02
555,
556,
557,
558,
619,
620,
681,
682,
743,
744,
805,
806,
867,
868,

** Surfaces based on sbound_01
*SURFACE, NAME=Ssbound_01
30, S5
60, S5
90, S5
120, S5
150, S5
180, S5

** Surfaces based on sbound_02
*SURFACE, NAME=Ssbound_02
181, S3
211, S3
241, S3
271, S3
301, S3
331, S3

** Names based on refnode
*NSET,NSET=Nrefnode
869,

*COUPLING,REF NODE=869,SURFACE=Ssbound_01,CONSTRAINT NAME=CN1
*DISTRIBUTING
1,1
2,2
3,3
4,4
5,5
6,6

*COUPLING,REF NODE=869,SURFACE=Ssbound_02,CONSTRAINT NAME=CN2
*DISTRIBUTING
1,1
2,2
3,3
4,4
5,5
6,6

*MATERIAL, Name=steel

*ELASTIC
210000, 0.3

*DENSITY
7.86E-9

*SOLID SECTION,ELSET=Eall,MATERIAL=Steel

*STEP

*STATIC

*BOUNDARY
Nfix_01,1,3,0
Nfix_02,1,3,0

**Nrefnode,4,4,0.005

*DLOAD
Eall,GRAV,9810,1,0,0

*NODE FILE
U

*EL FILE
S

*END STEP
