*HEADING
Model: beam coupling

*NODE, NSET=Nall
       1,0.000000000000e+000,-2.500000000000e+001,-2.500000000000e+001
       2,0.000000000000e+000,-2.500000000000e+001,0.000000000000e+000
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*ELEMENT, TYPE=C3D8, ELSET=Esolid
     1,     1,     2,     3,     4,     5,     6,     7,     8
     2,     4,     3,     9,    10,     8,     7,    11,    12
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*ELEMENT, TYPE=B32R, ELSET=Ebeam
    17,     46,     48,     47
    18,     47,     50,     49

** Names based on fix
*NSET,NSET=Nfix
1,
2,
5,
6,
21,
22,
31,
33,
41,

** Names based on load
*NSET,NSET=Nload
49,

**Surfaces based on surface
*SURFACE, NAME=Ssurface
4,  S5
12, S5
8,  S5
16, S5

*COUPLING,REF NODE=46,SURFACE=Ssurface,CONSTRAINT NAME=CN1
***???
***KINEMATIC
**???
*DISTRIBUTING
1,6

*MATERIAL, Name=steel

*ELASTIC
210000, 0.3

*DENSITY
7.86E-9

*SOLID SECTION, Elset=Esolid, Material=steel

*BEAM SECTION,ELSET=Ebeam,MATERIAL=steel,SECTION=RECT
50,50

*STEP
**, NLGEOM

*STATIC

*BOUNDARY
Nfix,1,3,0
Nload,3,3,-1

*NODE FILE, OUTPUT=3D
U

*EL FILE
S

*NODE PRINT,NSET=Nfix,totals=only
RF

*END STEP
