*HEADING
Model: cantilever beam
*NODE
      1, -0.0206761379, -0.0170000009,           1.
      2, -0.0206761379, 0.00800000038,           1.
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*ELEMENT, TYPE=C3D8R
  1, 124, 125, 128, 127,   1,   2,   5,   4
  2, 125, 126, 129, 128,   2,   3,   6,   5
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**
*ELSET, ELSET=ALL_ELEMENTS, GENERATE
1,160
*NSET, NSET=FORCE_APPLICATION_NODE
243
*NSET, NSET=FIXED_END
1,2,3,124,125,126,247,248,249
**
*MATERIAL, NAME=steel
*ELASTIC
2.1e+11, 0.3
*SOLID SECTION, ELSET=ALL_ELEMENTS, MATERIAL=steel
**
*BOUNDARY
FIXED_END, 1, 3
**
*STEP
*STATIC, DIRECT
.1,1.
**
*CLOAD
FORCE_APPLICATION_NODE, 2, -5000.
**
*NODE FILE
U
*EL FILE
S
**
*END STEP
