***********************************************************************
**                      	UNITS
**   		Length(mm), Time (s), Mass (t), Force(N)
**		     Temp(K), Density(10**3*KG/mm**3)
**            mm, s, t, N, MPa, mm/s, t, mm**3, mJ, 9810.
***********************************************************************
**

***********************************************************************
*NODE, NSET=Nall
       1,1.464466094070e+000,3.535533905930e+000,0.000000000000e+000
       2,1.197970172002e+000,3.247240241648e+000,0.000000000000e+000
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*ELEMENT, TYPE=C3D8R, ELSET=Eall
     1,     1,     2,     3,     4,     5,     6,     7,     8
     2,     4,     3,     9,    10,     8,     7,    11,    12
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***
** Names based on fix_x
*NSET,NSET=Nfix_x
4778,
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***
** Names based on fix_y
*NSET,NSET=Nfix_y
1211,
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***
** Names based on fix_z
*NSET,NSET=Nfix_z
1,
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***
** Surfaces based on slave
*SURFACE, NAME=Sslave
8001, S1
8101, S1
8002, S1
8102, S1
8003, S1
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12910, S1
***
** Surfaces based on master
*SURFACE, NAME=Smaster
1, S1
101, S1
2, S1
102, S1
3, S1
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4910, S1

***********************************************************************
*BOUNDARY
Nfix_x, 1,1, 0.
Nfix_y, 2,2, 0.
Nfix_z, 3,3, 0.

***********************************************************************
*CONTACT PAIR, INTERACTION=contact1,TYPE=SURFACE TO SURFACE
Sslave, Smaster
*SURFACE INTERACTION, NAME=contact1
*SURFACE BEHAVIOR,PRESSURE-OVERCLOSURE=LINEAR
1.e6
**FRICTION
**0.12,2.e4

*TIE, NAME=T1, POSITION TOLERANCE=0.01
Sslave, Smaster

***********************************************************************
*MATERIAL, NAME=M1.4401
*ELASTIC
196000., 0.3
*PLASTIC,HARDENING=ISOTROPIC
220., 0.002
670., 0.45
*SOLID SECTION, ELSET=Eall, MATERIAL=M1.4401

***********************************************************************
*STEP,NLGEOM
*STATIC,SOLVER=PARDISO
.1, 1.,1e-5,.1

***********************************************************************
**BOUNDARY
**Nload,1,1,.5
*DLOAD
** Pressure based on load
12010, P5, -124.86
12110, P5, -124.86
16000, P5, -124.86
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15990, P5, -124.86

***********************************************************************
*NODE FILE
U

*NODE PRINT, NSET=Nfix_x, TOTALS=ONLY
RF

***********************************************************************
*EL FILE
S, E, PEEQ

*CONTACT FILE
CSTR

*END STEP
