** Generated by Mecway 11.1
*NODE
1,0,0,0
2,0,0,4
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*ELEMENT,TYPE=B32R
1,2,26,10
2,10,27,9
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*NSET,NSET=fixed_support_nodes
1
*NSET,NSET=force_nodes
2
*ELSET,ELSET=Default
1
2
3
4
5
6
7
8
9
10
11
12
13
14
15
16
*MATERIAL,NAME=Material
*ELASTIC,TYPE=ISOTROPIC
4444444,0
*BEAM SECTION,ELSET=Default,MATERIAL=Material,SECTION=CIRC
0.1,0.1
0,1,0
*BOUNDARY
1,1,,0
1,2,,0
1,3,,0
1,4,,0
1,5,,0
1,6,,0
*STEP
*STATIC
*CLOAD
2,2,4
*NODE FILE,GLOBAL=YES
U
*EL FILE,OUTPUT=2D,SECTION FORCES
S
*END STEP
