** Generated by Mecway 6.0
*NODE
1,-0.1,0,0
2,0.1,0,0
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*ELEMENT,TYPE=CPE4
1,1927,1926,4052,4036
3,36227,36225,35967,35968
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*ELEMENT,TYPE=CPE3
2,36226,36227,35968
15,7,36700,36847
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*NSET,NSET=contact-nset-upper
10707
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*NSET,NSET=contact-nset-lower-LH
61
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*NSET,NSET=contact-nset-lower-RH
74
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*NSET,NSET=contact-nset-punch
34046
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*NSET,NSET=bc-y
72
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*NSET,NSET=nset-anvil-LH
3
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*NSET,NSET=nset-anvil-RH
36850
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*NSET,NSET=nset-punch
8
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*ELSET,ELSET=workpiece
1
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*ELSET,ELSET=punch
10
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*ELSET,ELSET=anvil-LH
2
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*ELSET,ELSET=anvil-RH
34501
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*SURFACE,NAME=contact-anvil-LH
3,S3
33611,S1
33612,S1
33613,S1
33614,S1
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34483,S2
*SURFACE,NAME=contact-anvil-RH
34501,S1
34502,S1
34503,S1
34504,S1
34505,S1
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35371,S2
*SURFACE,NAME=contact-lower-LH
2173,S1
2189,S1
2205,S1
2221,S1
2237,S1
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21917,S1
*SURFACE,NAME=contact-lower-RH
2397,S1
2413,S1
2429,S1
2445,S1
2461,S1
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29981,S1
*SURFACE,NAME=contact-punch
32017,S1
32018,S1
32019,S1
32020,S1
32021,S1
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33591,S3
*SURFACE,NAME=contact-upper
2316,S3
2332,S3
2348,S3
2364,S3
2380,S3
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25388,S3
*MATERIAL,NAME=Material-316
*ELASTIC,TYPE=ISOTROPIC
200000000000,0.3
*SOLID SECTION,ELSET=workpiece,MATERIAL=Material-316
1
*SOLID SECTION,ELSET=punch,MATERIAL=Material-316
1
*SOLID SECTION,ELSET=anvil-LH,MATERIAL=Material-316
1
*SOLID SECTION,ELSET=anvil-RH,MATERIAL=Material-316
1
*RIGID BODY,NSET=nset-anvil-LH,REF NODE=38001,ROT NODE=38004
*RIGID BODY,NSET=nset-anvil-RH,REF NODE=38002,ROT NODE=38005
*RIGID BODY,NSET=nset-punch,REF NODE=38003,ROT NODE=38006
*CONTACT PAIR,INTERACTION=IN_DIE,TYPE=SURFACE TO SURFACE
contact-upper,contact-punch
*SURFACE INTERACTION,NAME=IN_DIE
*SURFACE BEHAVIOR,PRESSURE-OVERCLOSURE=EXPONENTIAL
1.e-7,.1
*CONTACT PAIR,INTERACTION=IN_LH,TYPE=SURFACE TO SURFACE
contact-lower-LH,contact-anvil-LH
*SURFACE INTERACTION,NAME=IN_LH
*SURFACE BEHAVIOR,PRESSURE-OVERCLOSURE=EXPONENTIAL
1.e-7,.1
*CONTACT PAIR,INTERACTION=IN_RH,TYPE=SURFACE TO SURFACE
contact-lower-RH,contact-anvil-RH
*SURFACE INTERACTION,NAME=IN_RH
*SURFACE BEHAVIOR,PRESSURE-OVERCLOSURE=EXPONENTIAL
1.e-7,.1
*BOUNDARY
38001,1,2
38002,1,2
38003,1,1
**38003,3,3
38004,1,3
38005,1,3
38006,1,3
bc-y,2,2
*STEP
*STATIC
*BOUNDARY
38003,2,2,-0.002
*NODE FILE,GLOBAL=YES
U,RF
*EL FILE
S
*END STEP
