*NODE, NSET=Nall
4, 50.000000, 10.000000, 0.000000
1, 0.000000, 0.000000, 0.000000
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*ELEMENT, TYPE=CPE8, ELSET=Eall
1, 102, 106, 108, 107, 154, 155, 156, 157
2, 106, 68, 69, 108, 158, 88, 159, 155
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*NSET,NSET=PART0_bottom_nall
1, 5, 91, 90, 92, 94,
96, 93, 95
*NSET,NSET=P0_nall
1
*ELSET,ELSET=PART0
1, 2, 3, 4, 5, 6
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*BOUNDARY
PART0_bottom_nall,1,1,0.000000
*BOUNDARY
P0_nall,2,2,0.000000
*MATERIAL,NAME=concrete
*ELASTIC
30000000000,0.2
*DENSITY
2300
*SOLID SECTION,ELSET=PART0,MATERIAL=concrete
100
*STEP
*STATIC
** Gravity on component: PART0_elements
*DLOAD
PART0,GRAV,9.810000,-1.,0.,0.
*EL FILE
E,S
*NODE FILE
RF,U
*END STEP
