*NODE
1,1,0.7474874353712,0.7474873114594
2,1,0,6.123031769112E-17
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*ELEMENT,TYPE=C3D8
1,29,15,31,13,4,6,12,43
2,38,14,47,24,29,15,31,13
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*ELEMENT,TYPE=C3D4
13,30,50,51,52
*NSET,NSET=T2
53
*ELSET,ELSET=Default
1
2
3
4
5
6
7
8
9
10
11
12
13
*SURFACE,NAME=node-surface_coupling_faces
3,S1
12,S1
7,S1
5,S1
9,S1
6,S1
8,S1
10,S1
11,S1
2,S3
4,S3
1,S3
*MATERIAL,NAME=Material(2)
*ELASTIC,TYPE=ISOTROPIC
200000000000,0
*SOLID SECTION,ELSET=Default,MATERIAL=Material(2)
*TRANSFORM,NSET=T2
1,0,0,0,1,0
*BOUNDARY
5,1,,0
5,2,,0
5,3,,0
12,1,,0
12,2,,0
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52,1,,0
*COUPLING,REFNODE=53,SURFACE=node-surface_coupling_faces,CONSTRAINTNAME=Coupling_1
*DISTRIBUTING
1,6
*EQUATION
2
30,2,-1,53,6,1
*STEP
*STATIC
*BOUNDARY
50,2,,0.1
51,2,,0.1
52,2,,0.1
*NODE FILE
U
*END STEP
