**
** ABAQUS Input Deck Generated by HyperMesh Version  : 13.0.110.31
** Generated using HyperMesh-Abaqus Template Version : 13.0.110
**
**   Template:  ABAQUS/EXPLICIT
**
*NODE
         1,  25.0           ,  -25.0          ,  2.842170943E-14
         2,  25.0           ,  -3.55271368E-15,  0.0
         3,  25.0           ,  25.0           ,  0.0
         4,  25.0           ,  25.0           ,  25.0
         5,  25.0           ,  25.0           ,  50.0
         6,  25.0           ,  25.0           ,  75.0
         7,  25.0           ,  25.0           ,  100.0
         8,  25.0           ,  25.0           ,  125.0
         9,  25.0           ,  25.0           ,  150.0
        10,  25.0           ,  25.0           ,  175.0
        11,  25.0           ,  25.0           ,  200.0
        12,  25.0           ,  -3.55271368E-15,  200.0
        13,  25.0           ,  -25.0          ,  200.0
        14,  25.0           ,  -25.0          ,  175.0
        15,  25.0           ,  -25.0          ,  150.0
        16,  25.0           ,  -25.0          ,  125.0
        17,  25.0           ,  -25.0          ,  100.0
        18,  25.0           ,  -25.0          ,  75.0
        19,  25.0           ,  -25.0          ,  50.0
        20,  25.0           ,  -25.0          ,  25.0
        21,  25.0           ,  0.0            ,  100.0
        22,  25.0           ,  0.0            ,  50.0
        23,  25.0           ,  0.0            ,  25.0
        24,  25.0           ,  0.0            ,  75.0
        25,  25.0           ,  0.0            ,  150.0
        26,  25.0           ,  0.0            ,  125.0
        27,  25.0           ,  0.0            ,  175.0
        28,  3.503661130E-15,  2.728369022E-15,  75.0
        29,  -3.55271368E-15,  -25.0          ,  75.0
        30,  -3.55271368E-15,  -25.0          ,  50.0
        31,  3.539632994E-15,  1.213102601E-15,  50.0
        32,  -25.0          ,  5.930134422E-15,  75.0
        33,  -25.0          ,  -25.0          ,  75.0
        34,  -25.0          ,  -25.0          ,  50.0
        35,  -25.0          ,  4.206384645E-15,  50.0
        36,  4.554694044E-15,  6.548190219E-16,  150.0
        37,  -3.55271368E-15,  -25.0          ,  150.0
        38,  -3.55271368E-15,  -25.0          ,  125.0
        39,  2.869247959E-15,  1.611801850E-15,  125.0
        40,  -25.0          ,  3.951712633E-15,  150.0
        41,  -25.0          ,  -25.0          ,  150.0
        42,  -25.0          ,  -25.0          ,  125.0
        43,  -25.0          ,  3.703114357E-15,  125.0
        44,  -7.10542736E-15,  25.0           ,  25.0
        45,  3.549443539E-15,  1.413498686E-15,  25.0
        46,  -3.55271368E-15,  0.0            ,  7.105427358E-15
        47,  -3.55271368E-15,  25.0           ,  0.0
        48,  -25.0          ,  25.0           ,  25.0
        49,  -25.0          ,  1.958730073E-15,  25.0
        50,  -25.0          ,  3.552713679E-15,  0.0
        51,  -25.0          ,  25.0           ,  0.0
        52,  -7.10542736E-15,  -25.0          ,  25.0
        53,  -25.0          ,  -25.0          ,  25.0
        54,  -3.55271368E-15,  -25.0          ,  100.0
        55,  3.369584001E-15,  2.062038894E-15,  100.0
        56,  -25.0          ,  -25.0          ,  100.0
        57,  -25.0          ,  3.972883059E-15,  100.0
        58,  -3.55271368E-15,  25.0           ,  75.0
        59,  -3.55271368E-15,  25.0           ,  50.0
        60,  -25.0          ,  25.0           ,  75.0
        61,  -25.0          ,  25.0           ,  50.0
        62,  4.691387235E-15,  1.007474268E-15,  175.0
        63,  -7.10542736E-15,  -25.0          ,  175.0
        64,  -25.0          ,  2.207864267E-15,  175.0
        65,  -25.0          ,  -25.0          ,  175.0
        66,  -3.55271368E-15,  25.0           ,  175.0
        67,  0.0            ,  25.0           ,  150.0
        68,  -25.0          ,  25.0           ,  175.0
        69,  -25.0          ,  25.0           ,  150.0
        70,  -3.55271368E-15,  0.0            ,  200.0
        71,  -3.55271368E-15,  -25.0          ,  200.0
        72,  -25.0          ,  7.105427358E-15,  200.0
        73,  -25.0          ,  -25.0          ,  200.0
        74,  -7.10542736E-15,  25.0           ,  125.0
        75,  -25.0          ,  25.0           ,  125.0
        76,  -3.55271368E-15,  -25.0          ,  1.421085472E-14
        77,  -25.0          ,  -25.0          ,  0.0
        78,  -3.55271368E-15,  25.0           ,  100.0
        79,  -25.0          ,  25.0           ,  100.0
        80,  -3.55271368E-15,  25.0           ,  200.0
        81,  -25.0          ,  25.0           ,  200.0
**HWCOLOR COMP          1    10
*ELEMENT,TYPE=C3D8R,ELSET=balken
        17,        24,        22,        19,        18,        28,        31,        30,
        29
        18,        28,        31,        30,        29,        32,        35,        34,
        33
        19,        25,        26,        16,        15,        36,        39,        38,
        37
        20,        36,        39,        38,        37,        40,        43,        42,
        41
        21,         4,         3,         2,        23,        44,        47,        46,
        45
        22,        44,        47,        46,        45,        48,        51,        50,
        49
        23,        22,        23,        20,        19,        31,        45,        52,
        30
        24,        31,        45,        52,        30,        35,        49,        53,
        34
        25,        26,        21,        17,        16,        39,        55,        54,
        38
        26,        39,        55,        54,        38,        43,        57,        56,
        42
        27,         6,         5,        22,        24,        58,        59,        31,
        28
        28,        58,        59,        31,        28,        60,        61,        35,
        32
        29,        27,        25,        15,        14,        62,        36,        37,
        63
        30,        62,        36,        37,        63,        64,        40,        41,
        65
        31,        10,         9,        25,        27,        66,        67,        36,
        62
        32,        66,        67,        36,        62,        68,        69,        40,
        64
        33,         5,         4,        23,        22,        59,        44,        45,
        31
        34,        59,        44,        45,        31,        61,        48,        49,
        35
        35,        12,        27,        14,        13,        70,        62,        63,
        71
        36,        70,        62,        63,        71,        72,        64,        65,
        73
        37,         9,         8,        26,        25,        67,        74,        39,
        36
        38,        67,        74,        39,        36,        69,        75,        43,
        40
        39,        21,        24,        18,        17,        55,        28,        29,
        54
        40,        55,        28,        29,        54,        57,        32,        33,
        56
        41,        23,         2,         1,        20,        45,        46,        76,
        52
        42,        45,        46,        76,        52,        49,        50,        77,
        53
        43,         7,         6,        24,        21,        78,        58,        28,
        55
        44,        78,        58,        28,        55,        79,        60,        32,
        57
        45,         8,         7,        21,        26,        74,        78,        55,
        39
        46,        74,        78,        55,        39,        75,        79,        57,
        43
        47,        11,        10,        27,        12,        80,        66,        62,
        70
        48,        80,        66,        62,        70,        81,        68,        64,
        72
**HM_PROP_ID          1
**HM_comp_by_property "property1"    11
*SOLID SECTION, ELSET=balken, MATERIAL=material1
**HMNAME MATS          1 material1    11
*MATERIAL, NAME=material1
*DENSITY
7.8000E-09,0.0
*ELASTIC, TYPE = ISOTROPIC
210000.0  ,0.3       ,0.0
*AMPLITUDE, NAME =amp, DEFINITION = TABULAR
0.0       ,0.0
0.2       ,1.0
**HMNAME CURVE          1 amp
**HMNAME LOADSTEP          1 step
*STEP, INC=1000,
*DYNAMIC, EXPLICIT
        0.0  ,       0.2,          ,
**HWNAME LOADCOL          1 bc
**HWCOLOR LOADCOL          1    11
*BOUNDARY
        11,1,3,0.0
        12,1,3,0.0
        13,1,3,0.0
        70,1,3,0.0
        71,1,3,0.0
        72,1,3,0.0
        73,1,3,0.0
        80,1,3,0.0
        81,1,3,0.0
**HWNAME LOADCOL          2 cload
**HWCOLOR LOADCOL          2    11
*CLOAD, AMPLITUDE = amp
         1,2,10.0
         2,2,10.0
         3,2,10.0
        46,2,10.0
        47,2,10.0
        50,2,10.0
        51,2,10.0
        76,2,10.0
        77,2,10.0

*NODE FILE
U,
*EL FILE
S,
E,
*END STEP
