**
** ABAQUS Input Deck Generated by HyperMesh Version  : 13.0.110.31
** Generated using HyperMesh-Abaqus Template Version : 13.0.110
**
**   Template:  ABAQUS/EXPLICIT
**
*NODE
         1,  60.673852157985,  -28.88372427709,  1.938893490E-11
         2,  60.659519509285,  -27.14067743208,  -9.876958291212
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**HWCOLOR COMP          2    49
*ELEMENT,TYPE=S4R,ELSET=Middle Surface
         1,        22,        23,        32,        27
         2,        28,        31,        29,        27
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**HM_PROP_ID          1
**HM_comp_by_property "prop"    11
*SHELL SECTION, ELSET=Middle Surface, MATERIAL=pet
1.0       ,
*NSET, NSET=hset
       498,       499,       500,       501,       502,       503,       504,       505
*NSET, NSET=bset
       438,       439,       440,       441,       442,       443
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**HMNAME MATS          1 pet    11
*MATERIAL, NAME=pet
*DENSITY
1.3800E-09,0.0
*ELASTIC, TYPE = ISOTROPIC
4500.0    ,0.0       ,0.0
*AMPLITUDE, NAME =amp, DEFINITION = TABULAR
0.0       ,0.0
5.0       ,1.0
**HMNAME CURVE          1 amp
**HMNAME LOADSTEP          1 ls
*STEP, NLGEOM = YES
*DYNAMIC, EXPLICIT
          ,       5.0,          ,
**HWNAME LOADCOL          1 bcb
**HWCOLOR LOADCOL          1    11
*BOUNDARY
bset,1,3,0.0
**HWNAME LOADCOL          2 bch
**HWCOLOR LOADCOL          2    11
*BOUNDARY, AMPLITUDE = amp
hset,1, ,5.0
hset,2, ,0.0
hset,3, ,0.0
*FILE OUTPUT, NUMBER INTERVAL = 1
*NODE FILE
U,
*EL FILE
S,
E,
*END STEP
