**
** ABAQUS Input Deck Generated by HyperMesh Version  : 13.0.110.31
** Generated using HyperMesh-Abaqus Template Version : 13.0.110
**
**   Template:  ABAQUS/STANDARD 3D
**
*NODE
         1,  59.67919797775 ,  -28.5409653909 ,  -1.18878800E-06
         2,  54.910046455316,  -26.16458108347,  -7.11608488E-07
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**HWCOLOR COMP          2    49
*ELEMENT,TYPE=S3,ELSET=Middle Surface
      4163,      2014,      2015,      2019
      4162,      2013,      2014,      2021
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**HM_PROP_ID          1
**HM_comp_by_property "shellprop"    11
*SHELL SECTION, ELSET=Middle Surface, MATERIAL=stol95_r540
0.6       ,
*NSET, NSET=halsset
      2002,      2001,      2000,      1999,      1998,      1997
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*NSET, NSET=bodenset
      1784,      1783,      1782,      1781,      1780,      1779
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**HMNAME MATS          1 stol95_r540    11
*MATERIAL, NAME=stol95_r540
*DENSITY
8.9000E-09,0.0
*ELASTIC, TYPE = ISOTROPIC
125000.0  ,0.33      ,0.0
*AMPLITUDE, NAME =amp, DEFINITION = TABULAR
0.0       ,0.0
1.0       ,1.0
**HMNAME CURVE          1 amp
**HMNAME LOADSTEP          1 ls
*STEP, INC =          500
*STATIC
**HWNAME LOADCOL          1 bc
**HWCOLOR LOADCOL          1    11
*BOUNDARY
bodenset,1,6,0.0
**HWNAME LOADCOL          2 dyn
**HWCOLOR LOADCOL          2    11
*BOUNDARY
halsset,1, ,1.0
halsset,2, ,0.0
halsset,3, ,0.0
*NODE FILE
U,
RF,
*EL FILE
S,
E,
*END STEP
*****
