** Generated by Mecway 8.0
*NODE
1,-0.5498254520135,0.5340609634416,0.06666666666667
2,0.03489550989227,0.7992385772655,0
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*ELEMENT,TYPE=C3D8
1,1134,1148,1151,1138,1135,1149,244,1139
2,1190,1204,1207,1194,1191,1205,245,1195
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*NSET,NSET=nset-CL
231
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*NSET,NSET=nset-fix-uz
143
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*NSET,NSET=nset-fix-uy
9
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*NSET,NSET=nset-fix-ux
49
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*NSET,NSET=nall
1
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*ELSET,ELSET=Default
1
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*MATERIAL,NAME=Material
*ELASTIC,TYPE=ISOTROPIC
165000000000,0.311
*SOLID SECTION,ELSET=Default,MATERIAL=Material
*BOUNDARY
143,1,,0
143,2,,0
143,3,,0
144,1,,0
144,2,,0
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39311,3,,0
*TRANSFORM,NSET=nall,TYPE=C
0.,0.,0.,0.,0.,1.
*STEP
*STATIC
*CLOAD
231,3,-562.03125
247,3,-562.03125
251,3,-562.03125
259,3,-562.03125
263,3,-562.03125
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20822,3,-562.03125
*NODE FILE,GLOBAL=NO
U
*EL FILE,GLOBAL=NO
S
*END STEP
