*HEADING
Model: gg Date: 21/06/2010  23:57:23
**
** COORDINATES
**
*NODE, NSET=NALL
       1,   0.0000000    ,   45.000000    ,   0.0000000
       2,   50.000000    ,   45.000000    ,   0.0000000
       3,   50.000000    ,   40.000000    ,   0.0000000
       4,   0.0000000    ,   40.000000    ,   0.0000000
       5,   1.7857143    ,   45.000000    ,   0.0000000
       6,   3.5714286    ,   45.000000    ,   0.0000000
       7,   5.3571429    ,   45.000000    ,   0.0000000
       8,   7.1428571    ,   45.000000    ,   0.0000000
       9,   8.9285714    ,   45.000000    ,   0.0000000
      10,   10.714286    ,   45.000000    ,   0.0000000
      11,   12.500000    ,   45.000000    ,   0.0000000
      12,   14.285714    ,   45.000000    ,   0.0000000
      13,   16.071429    ,   45.000000    ,   0.0000000
      14,   17.857143    ,   45.000000    ,   0.0000000
      15,   19.642857    ,   45.000000    ,   0.0000000
      16,   21.428571    ,   45.000000    ,   0.0000000
      17,   23.214286    ,   45.000000    ,   0.0000000
      18,   25.000000    ,   45.000000    ,   0.0000000
      19,   26.785714    ,   45.000000    ,   0.0000000
      20,   28.571429    ,   45.000000    ,   0.0000000
      21,   30.357143    ,   45.000000    ,   0.0000000
      22,   32.142857    ,   45.000000    ,   0.0000000
      23,   33.928571    ,   45.000000    ,   0.0000000
      24,   35.714286    ,   45.000000    ,   0.0000000
      25,   37.500000    ,   45.000000    ,   0.0000000
      26,   39.285714    ,   45.000000    ,   0.0000000
      27,   41.071429    ,   45.000000    ,   0.0000000
      28,   42.857143    ,   45.000000    ,   0.0000000
      29,   44.642857    ,   45.000000    ,   0.0000000
      30,   46.428571    ,   45.000000    ,   0.0000000
      31,   48.214286    ,   45.000000    ,   0.0000000
      32,   50.000000    ,   43.750000    ,   0.0000000
      33,   50.000000    ,   42.500000    ,   0.0000000
      34,   50.000000    ,   41.250000    ,   0.0000000
      35,   48.214286    ,   40.000000    ,   0.0000000
      36,   46.428571    ,   40.000000    ,   0.0000000
      37,   44.642857    ,   40.000000    ,   0.0000000
      38,   42.857143    ,   40.000000    ,   0.0000000
      39,   41.071429    ,   40.000000    ,   0.0000000
      40,   39.285714    ,   40.000000    ,   0.0000000
      41,   37.500000    ,   40.000000    ,   0.0000000
      42,   35.714286    ,   40.000000    ,   0.0000000
      43,   33.928571    ,   40.000000    ,   0.0000000
      44,   32.142857    ,   40.000000    ,   0.0000000
      45,   30.357143    ,   40.000000    ,   0.0000000
      46,   28.571429    ,   40.000000    ,   0.0000000
      47,   26.785714    ,   40.000000    ,   0.0000000
      48,   25.000000    ,   40.000000    ,   0.0000000
      49,   23.214286    ,   40.000000    ,   0.0000000
      50,   21.428571    ,   40.000000    ,   0.0000000
      51,   19.642857    ,   40.000000    ,   0.0000000
      52,   17.857143    ,   40.000000    ,   0.0000000
      53,   16.071429    ,   40.000000    ,   0.0000000
      54,   14.285714    ,   40.000000    ,   0.0000000
      55,   12.500000    ,   40.000000    ,   0.0000000
      56,   10.714286    ,   40.000000    ,   0.0000000
      57,   8.9285714    ,   40.000000    ,   0.0000000
      58,   7.1428571    ,   40.000000    ,   0.0000000
      59,   5.3571429    ,   40.000000    ,   0.0000000
      60,   3.5714286    ,   40.000000    ,   0.0000000
      61,   1.7857143    ,   40.000000    ,   0.0000000
      62,   0.0000000    ,   41.250000    ,   0.0000000
      63,   0.0000000    ,   42.500000    ,   0.0000000
      64,   0.0000000    ,   43.750000    ,   0.0000000
      65,   3.5714286    ,   42.500000    ,   0.0000000
      66,   7.1428571    ,   42.500000    ,   0.0000000
      67,   10.714286    ,   42.500000    ,   0.0000000
      68,   14.285714    ,   42.500000    ,   0.0000000
      69,   17.857143    ,   42.500000    ,   0.0000000
      70,   21.428571    ,   42.500000    ,   0.0000000
      71,   25.000000    ,   42.500000    ,   0.0000000
      72,   28.571429    ,   42.500000    ,   0.0000000
      73,   32.142857    ,   42.500000    ,   0.0000000
      74,   35.714286    ,   42.500000    ,   0.0000000
      75,   39.285714    ,   42.500000    ,   0.0000000
      76,   42.857143    ,   42.500000    ,   0.0000000
      77,   46.428571    ,   42.500000    ,   0.0000000
      78,   1.7857143    ,   42.500000    ,   0.0000000
      79,   3.5714286    ,   43.750000    ,   0.0000000
      80,   3.5714286    ,   41.250000    ,   0.0000000
      81,   7.1428571    ,   41.250000    ,   0.0000000
      82,   5.3571429    ,   42.500000    ,   0.0000000
      83,   10.714286    ,   41.250000    ,   0.0000000
      84,   8.9285714    ,   42.500000    ,   0.0000000
      85,   14.285714    ,   41.250000    ,   0.0000000
      86,   12.500000    ,   42.500000    ,   0.0000000
      87,   17.857143    ,   41.250000    ,   0.0000000
      88,   16.071429    ,   42.500000    ,   0.0000000
      89,   21.428571    ,   41.250000    ,   0.0000000
      90,   19.642857    ,   42.500000    ,   0.0000000
      91,   25.000000    ,   41.250000    ,   0.0000000
      92,   23.214286    ,   42.500000    ,   0.0000000
      93,   28.571429    ,   41.250000    ,   0.0000000
      94,   26.785714    ,   42.500000    ,   0.0000000
      95,   32.142857    ,   41.250000    ,   0.0000000
      96,   30.357143    ,   42.500000    ,   0.0000000
      97,   35.714286    ,   41.250000    ,   0.0000000
      98,   33.928571    ,   42.500000    ,   0.0000000
      99,   39.285714    ,   41.250000    ,   0.0000000
     100,   37.500000    ,   42.500000    ,   0.0000000
     101,   42.857143    ,   41.250000    ,   0.0000000
     102,   41.071429    ,   42.500000    ,   0.0000000
     103,   46.428571    ,   41.250000    ,   0.0000000
     104,   44.642857    ,   42.500000    ,   0.0000000
     105,   48.214286    ,   42.500000    ,   0.0000000
     106,   46.428571    ,   43.750000    ,   0.0000000
     107,   42.857143    ,   43.750000    ,   0.0000000
     108,   39.285714    ,   43.750000    ,   0.0000000
     109,   35.714286    ,   43.750000    ,   0.0000000
     110,   32.142857    ,   43.750000    ,   0.0000000
     111,   28.571429    ,   43.750000    ,   0.0000000
     112,   25.000000    ,   43.750000    ,   0.0000000
     113,   21.428571    ,   43.750000    ,   0.0000000
     114,   17.857143    ,   43.750000    ,   0.0000000
     115,   14.285714    ,   43.750000    ,   0.0000000
     116,   10.714286    ,   43.750000    ,   0.0000000
     117,   7.1428571    ,   43.750000    ,   0.0000000
     118,  -10.000000    ,   50.000000    ,   0.0000000
     119,  -5.0000000    ,   45.000000    ,   0.0000000
**
** TRANSFORMATIONS
**
*NSET, NSET=T1
       4
*TRANSFORM, NSET=T1    , TYPE=R
 -10.000    ,  10.000    ,  0.0000    , -10.000    ,  10.000    ,  10.000
**
** ELEMENT TOPOLOGY
**
*Solid Section, elset=E1   , material=M1
   1.000
*ELEMENT, TYPE=CPS8  ,ELSET=E1
       1,       1,      63,      65,       6,      64,      78,      79,       5
       2,      63,       4,      60,      65,      62,      61,      80,      78
       3,      65,      60,      58,      66,      80,      59,      81,      82
       4,      66,      58,      56,      67,      81,      57,      83,      84
       5,      67,      56,      54,      68,      83,      55,      85,      86
       6,      68,      54,      52,      69,      85,      53,      87,      88
       7,      69,      52,      50,      70,      87,      51,      89,      90
       8,      70,      50,      48,      71,      89,      49,      91,      92
       9,      71,      48,      46,      72,      91,      47,      93,      94
      10,      72,      46,      44,      73,      93,      45,      95,      96
      11,      73,      44,      42,      74,      95,      43,      97,      98
      12,      74,      42,      40,      75,      97,      41,      99,     100
      13,      75,      40,      38,      76,      99,      39,     101,     102
      14,      76,      38,      36,      77,     101,      37,     103,     104
      15,      77,      36,       3,      33,     103,      35,      34,     105
      16,      30,      77,      33,       2,     106,     105,      32,      31
      17,      28,      76,      77,      30,     107,     104,     106,      29
      18,      26,      75,      76,      28,     108,     102,     107,      27
      19,      24,      74,      75,      26,     109,     100,     108,      25
      20,      22,      73,      74,      24,     110,      98,     109,      23
      21,      20,      72,      73,      22,     111,      96,     110,      21
      22,      18,      71,      72,      20,     112,      94,     111,      19
      23,      16,      70,      71,      18,     113,      92,     112,      17
      24,      14,      69,      70,      16,     114,      90,     113,      15
      25,      12,      68,      69,      14,     115,      88,     114,      13
      26,      10,      67,      68,      12,     116,      86,     115,      11
      27,       8,      66,      67,      10,     117,      84,     116,       9
      28,       6,      65,      66,       8,      79,      82,     117,       7
**
** MATERIAL PROPERTIES
**
**
** M1
*MATERIAL, NAME=M1
*ELASTIC, TYPE=ISOTROPIC
    200000.    ,  0.30000
*DENSITY
   0.785000E-08,
*EXPANSION, TYPE=ISO
   0.120000E-04,
**
** EARTH SPRINGS
**
**
** FIXED FREEDOMS
**
*BOUNDARY
       1, 3
       2, 3
       3, 1, 3
       4, 2, 3
       5, 3
       6, 3
       7, 3
       8, 3
       9, 3
      10, 3
      11, 3
      12, 3
      13, 3
      14, 3
      15, 3
      16, 3
      17, 3
      18, 3
      19, 3
      20, 3
      21, 3
      22, 3
      23, 3
      24, 3
      25, 3
      26, 3
      27, 3
      28, 3
      29, 3
      30, 3
      31, 3
      32, 3
      33, 3
      34, 3
      35, 3
      36, 3
      37, 3
      38, 3
      39, 3
      40, 3
      41, 3
      42, 3
      43, 3
      44, 3
      45, 3
      46, 3
      47, 3
      48, 3
      49, 3
      50, 3
      51, 3
      52, 3
      53, 3
      54, 3
      55, 3
      56, 3
      57, 3
      58, 3
      59, 3
      60, 3
      61, 3
      62, 3
      63, 3
      64, 3
      65, 3
      66, 3
      67, 3
      68, 3
      69, 3
      70, 3
      71, 3
      72, 3
      73, 3
      74, 3
      75, 3
      76, 3
      77, 3
      78, 3
      79, 3
      80, 3
      81, 3
      82, 3
      83, 3
      84, 3
      85, 3
      86, 3
      87, 3
      88, 3
      89, 3
      90, 3
      91, 3
      92, 3
      93, 3
      94, 3
      95, 3
      96, 3
      97, 3
      98, 3
      99, 3
     100, 3
     101, 3
     102, 3
     103, 3
     104, 3
     105, 3
     106, 3
     107, 3
     108, 3
     109, 3
     110, 3
     111, 3
     112, 3
     113, 3
     114, 3
     115, 3
     116, 3
     117, 3
*ELSET, ELSET=ESET_S1
        1,        2,        3,        4,        5,        6,        7,        8,
        9,       10,       11,       12,       13,       14,       15,       16,
       17,       18,       19,       20,       21,       22,       23,       24,
       25,       26,       27,       28
*INITIAL CONDITIONS,TYPE=TEMPERATURE
Nall, 0.0
**
** LOADING
**
*Step
Case    1  fgf time increment:    1.0000
*Static, SOLVER=SPOOLES
1.0, 1.0, 1e-05, 1.0
**
** LOADS
**
**
**
**  Load  Case
**     1   1 Line  L1   , traction      0.0 , Pressure  5.
**
*Cload,OP=NEW
      1,2,  -2.9761907
      2,2,  -2.9761893
      5,2,  -11.904762
      6,2,  -5.9523814
      7,2,  -11.904761
      8,2,  -5.9523808
      9,2,  -11.904763
     10,2,  -5.9523816
     11,2,  -11.904760
     12,2,  -5.9523828
     13,2,  -11.904763
     14,2,  -5.9523795
     15,2,  -11.904760
     16,2,  -5.9523828
     17,2,  -11.904763
     18,2,  -5.9523787
     19,2,  -11.904763
     20,2,  -5.9523828
     21,2,  -11.904760
     22,2,  -5.9523795
     23,2,  -11.904763
     24,2,  -5.9523828
     25,2,  -11.904760
     26,2,  -5.9523828
     27,2,  -11.904763
     28,2,  -5.9523795
     29,2,  -11.904760
     30,2,  -5.9523828
     31,2,  -11.904763
** OUTPUT REQUESTS
**
*EL PRINT, ELSET=E1
S
*NODE FILE
U, RF
*EL FILE
S
*End Step
