*Heading
** Job name: Job-1 Model name: linear_test
** Generated by: Abaqus/CAE 6.13-1
*Preprint, echo=NO, model=NO, history=NO, contact=NO
**
** PARTS
**
*Part, name=PART-1-1
*Node
      1,   12.1499996,    2.9000001,   1.04999995
      2,   12.1499996,    2.6583333,   1.04999995
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*Element, type=C3D8H
   1,   66,   67,   80,   79,    1,    2,   15,   14
   2,   67,   68,   81,   80,    2,    3,   16,   15
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*Nset, nset=SET-1, generate
    1,  3120,     1
*Elset, elset=SET-1, generate
    1,  2256,     1
** Section: Section-1-SET-1
*Solid Section, elset=SET-1, material=MATERIAL-1
1.,
*End Part
**
**
** ASSEMBLY
**
*Assembly, name=Assembly
**
*Instance, name=PART-1-1, part=PART-1-1
*End Instance
**
*Nset, nset=FIX_BOT, instance=PART-1-1, generate
 3056,  3120,     1
*Nset, nset=FIX_TOP, instance=PART-1-1, generate
  1,  65,   1
*Nset, nset=FORCE, instance=PART-1-1
 1,
*Elset, elset=MID, instance=PART-1-1
 1158,
*Nset, nset=MID_3, instance=PART-1-1
 1561, 1573, 1613
*Nset, nset=NDRIVEN, instance=PART-1-1, generate
  2,  65,   1
*Elset, elset=_Surf-1_S2, internal, instance=PART-1-1, generate
  1,  48,   1
*Surface, type=ELEMENT, name=Surf-1
_Surf-1_S2, S2
** Constraint: Eqn-1
*End Assembly
**
** MATERIALS
**
*Material, name=MATERIAL-1
*Elastic
5., 0.45
** ----------------------------------------------------------------
**
** STEP: Step-1
**
*Step, name=Step-1, nlgeom=YES, inc=200
Simple Tension
*Static
0.01, 1., 1e-05, 0.1
**
** BOUNDARY CONDITIONS
**
** Name: Disp-BC-1 Type: Displacement/Rotation
*Boundary
FIX_BOT, 1, 1
** Name: Disp-BC-2 Type: Displacement/Rotation
*Boundary
FIX_BOT, 2, 2
** Name: Disp-BC-3 Type: Displacement/Rotation
*Boundary
FIX_BOT, 3, 3
** Name: Disp-BC-4 Type: Displacement/Rotation
*Boundary
FIX_TOP, 2, 2
** Name: Disp-BC-5 Type: Displacement/Rotation
*Boundary
FIX_TOP, 3, 3
**
** LOADS
**
** Name: Load-2   Type: Pressure
*Dsload
Surf-1, P, -1.
**
** OUTPUT REQUESTS
**
*Restart, write, frequency=0
**
** FIELD OUTPUT: F-Output-1
**
*Output, field, variable=PRESELECT
**
** HISTORY OUTPUT: H-Output-2
**
*Output, history
*Node Output, nset=FORCE
CF1, U1
**
** HISTORY OUTPUT: H-Output-3
**
*Element Output, elset=MID
E11, LE11, NE11, S11
**
** HISTORY OUTPUT: H-Output-4
**
*Node Output, nset=MID_3
COOR2, COOR3
**
** HISTORY OUTPUT: H-Output-1, H-Output-5
**
*Output, history, variable=PRESELECT
*End Step
