*NODE, NSET=Nall
       1,0.000000000000e+000,1.000000000000e+002,0.000000000000e+000
       2,0.000000000000e+000,7.500000000000e+001,0.000000000000e+000
       3,0.000000000000e+000,7.500000000000e+001,3.000000000000e+001
       4,0.000000000000e+000,1.000000000000e+002,3.000000000000e+001
       5,0.000000000000e+000,7.500000000000e+001,6.000000000000e+001
       6,0.000000000000e+000,1.000000000000e+002,6.000000000000e+001
       7,0.000000000000e+000,7.500000000000e+001,9.000000000000e+001
       8,0.000000000000e+000,1.000000000000e+002,9.000000000000e+001
       9,0.000000000000e+000,7.500000000000e+001,1.200000000000e+002
      10,0.000000000000e+000,1.000000000000e+002,1.200000000000e+002
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*ELEMENT, TYPE=S8R, ELSET=Eall
     1,      1,      2,      3,      4,    177,    178,    179,    180
     2,      4,      3,      5,      6,    179,    182,    183,    184
     3,      6,      5,      7,      8,    183,    186,    187,    188
     4,      8,      7,      9,     10,    187,    190,    191,    192
     5,     10,      9,     11,     12,    191,    194,    195,    196
     6,     12,     11,     13,     14,    195,    198,    199,    200
     7,     14,     13,     15,     16,    199,    202,    203,    204
     8,     16,     15,     17,     18,    203,    206,    207,    208
     9,     18,     17,     19,     20,    207,    210,    211,    212
    10,     20,     19,     21,     22,    211,    214,    215,    216
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** Names based on Nfix
*NSET,NSET=Nfix
1,
2,
23,
34,
45,
56,
57,
78,
89,
100,
101,
122,
133,
144,
155,
166,
** Names based on Nload
*NSET,NSET=Nload
21,
22,
33,
44,
55,
76,
77,
88,
99,
120,
121,
132,
143,
154,
165,
176,

*MATERIAL,NAME=Mat1
*ELASTIC
210000,0.3


*SHELL SECTION,MATERIAL=Mat1,ELSET=Eall,,OFFSET=0.0000E+00
5

*BOUNDARY
Nfix,1,3,0


*STEP
*STATIC
*CLOAD
Nload,3,100
*NODE FILE
U,
*EL FILE
S,
*END STEP
