*HEADING
ABAQUS job created on 24-Feb-16 at 07:50:40
**
*NODE, NSET=NALL
    2602,          -0.5,           0.5,           0.1
    2603,          -0.5,          0.25,           0.1
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**
**
*ELEMENT, TYPE=C3D8
    2501,    2602,    2603,    2608,    2607,    2627,    2628,
    2633,    2632
    2502,    2603,    2604,    2609,    2608,    2628,    2629,
    2634,    2633
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**
** E_PLATE
**
*ELSET, ELSET=E_PLATE, GENERATE
    2533,    5032,       1
**
** E_PUCK
**
*ELSET, ELSET=E_PUCK, GENERATE
    2501,    2532,       1
**
** N_PLATE
**
*NSET, NSET=N_PLATE, GENERATE
    2677,    7878,       1
**
** N_PUCK
**
*NSET, NSET=N_PUCK, GENERATE
    2602,    2676,       1
**
**
*****************************************************
*SOLID SECTION, ELSET=E_PUCK, MATERIAL=AL1
*SOLID SECTION, ELSET=E_PLATE, MATERIAL=AL
**
** Al
** Date: 24-Feb-16           Time: 07:47:23
**
*MATERIAL, NAME=AL
**
*DENSITY
    0.000259,
**
*ELASTIC, TYPE=ISO
1.E+7,         0.3
*PLASTIC
60000.,0.
65000.,1.0
**
** Al1
** Date: 24-Feb-16           Time: 07:47:23
**
*MATERIAL, NAME=AL1
**
*DENSITY
    0.000259,
**
*ELASTIC, TYPE=ISO
       1.E+7,         0.3
**
** PINNED
**
*BOUNDARY, OP=NEW
PINNED, 1,3
**
** VEL
**
*INITIAL CONDITIONS, TYPE=VELOCITY
VEL, 3,        -10.
**
** CON_1
**
***SURFACE, TYPE=ELEMENT, NAME=UPPER_SURFACE_PUCK
**    2517, S2
**    2518, S2
**    2519, S2
**    2520, S2
**    2521, S2
**    2522, S2
**    2523, S2
**    2524, S2
**    2525, S2
**    2526, S2
**    2527, S2
**    2528, S2
**    2529, S2
**    2530, S2
**    2531, S2
**    2532, S2
*SURFACE, TYPE=ELEMENT, NAME=M_CON_1_0
    2501, S1
    2502, S1
    2503, S1
    2504, S1
    2505, S1
    2506, S1
    2507, S1
    2508, S1
    2509, S1
    2510, S1
    2511, S1
    2512, S1
    2513, S1
    2514, S1
    2515, S1
    2516, S1
*SURFACE, TYPE=ELEMENT, NAME=S_CON_1_0
    2533, S2
    2534, S2
    2535, S2
    2536, S2
    2537, S2
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    5032, S2
*NSET, NSET=PINNED, GENERATE
    2677,    2728,       1
    2778,    2779,       1
    2829,    2830,       1
    2880,    2881,       1
    2931,    2932,       1
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    5226,    5277,       1
*NSET, NSET=VEL, GENERATE
    2602,    2676,       1
