*Heading
 E:\COMPOSITE\piastra_sr8.inp
*Node
1, 0, 0, 0
2, 10, 0, 0
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*Element, type=S8R, ELSET=PIASTRA
58, 2, 16, 37, 11, 19, 46, 47, 15
60, 11, 37, 38, 10, 47, 49, 50, 14
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*NSET, NSET=CLAMP
1, 36,32,35,31,34,30,33,4
*NSET, NSET=NODES, GENERATE
1,85
*NSET, NSET=LOADING_EDGE
2,19,16,20,17,21,18,22,3
*BOUNDARY
CLAMP, 1, 6
**
*ORIENTATION,name=OR0,system=RECTANGULAR
1.,0.,0.,0.,1.,0.

*ORIENTATION,name=OR135,system=RECTANGULAR
0.7071,-0.7071,0.,0.7071,0.7071,0.

*ORIENTATION,name=OR45,system=RECTANGULAR
0.7071,0.7071,0.,-0.7071,0.7071,0.

*ORIENTATION,name=OR90,system=RECTANGULAR
0.0,1.0,0.0,-1.0,0.0, 0
**
*MATERIAL, NAME=IMA
*ELASTIC,TYPE=ENGINEERING CONSTANTS
154000, 8500, 8500, 0.35, 0.35, 0.26488095, 4200
4200, 3360
*SHELL SECTION,ELSET=PIASTRA,COMPOSITE,OFFSET=-0.5
0.184,,IMA,OR0
0.184,,IMA,OR135
0.184,,IMA,OR45
0.184,,IMA,OR135
0.184,,IMA,OR0
*STEP
*STATIC
*CLOAD
LOADING_EDGE,1,1000.
*EL PRINT,ELSET=PIASTRA
S, E
*EL PRINT,ELSET=PIASTRA
S, E
*NODE PRINT, NSET=NODES
U
*EL FILE
S, E
*NODE FILE
U
*END STEP
