*Heading
plate
** Job name: Plate Model name: Model-1
**
*Node, NSET=Nall
      1,          10.,          25.,           0.
      2,          4.5,          25.,           0.
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*ELEMENT, TYPE=S4, ELSET=EALL
 1,  1,  2, 13, 12
 2,  2,  3, 14, 13
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**----------------------------------------------------------------------
**BOUNDARY CONDITIONS
*NSET, NSET=FIX
1,12,23,34,45,56,67
 *BOUNDARY
FIX,1,6
**----------------------------------------------------------------------
** MATERIAL SECTION
*MATERIAL,NAME=EL
*ELASTIC
 210000.0 ,       .3
*DENSITY
7.8E-9
*SHELL SECTION,ELSET=EALL,MATERIAL=EL
3.0
**-----------------------------------------------------------------------
 ** LOAD CONDITIONS
*NSET,NSET=LOAD
11,22,33,44,55,66,77
**------------------------------------------------------------------------
**LOADCASE DEFINITION
*STEP
*STATIC
*CLOAD
LOAD,3,100.
**---------PRINT-TO-FILE---------------------------------------
 *NODE PRINT,NSET=NALL
U
*EL PRINT,ELSET=EALL
S
*NODE FILE
U
*EL FILE
S
*END STEP
