*HEADING
Model: shell_edge-rb-solid
*NODE, NSET=Nall
       1,0.000000000000e+000,0.000000000000e+000,0.000000000000e+000
       2,0.000000000000e+000,2.500000000000e+001,0.000000000000e+000
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*ELEMENT, TYPE=S4, ELSET=Eall
     1,      1,      2,      3,      4
     2,      4,      3,      5,      6
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*ELEMENT, TYPE=C3D8, ELSET=Eall
    17,    28,    29,    30,    31,    32,    33,    34,    35
    18,    31,    30,    36,    37,    35,    34,    38,    39
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** Names based on shell
*ELSET,ELSET=Eshell
1,
2,
3,
4,
5,
6,
7,
8,
9,
10,
11,
12,
13,
14,
15,
16,
** Names based on solid
*ELSET,ELSET=Esolid
17,
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** Names based on Nshell
*NSET,NSET=NNshell
1,
2,
11,
16,
21,
** Names based on Nsolid
*NSET,NSET=NNsolid
28,
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** Names based on refnode
*NSET,NSET=Nrefnode
26,
** Names based on rotnode
*NSET,NSET=Nrotnode
27,
** Names based on fix
*NSET,NSET=Nfix
44,
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*RIGID BODY,NSET=NNshell,REF NODE=26,ROT NODE=27
*RIGID BODY,NSET=NNsolid,REF NODE=26,ROT NODE=27
*MATERIAL,NAME=Steel
*ELASTIC
210000,0.3
*DENSITY
7.86E-9
*SHELL SECTION,ELSET=Eshell,MATERIAL=Steel
1
*SOLID SECTION, Elset=Esolid, Material=steel
*STEP
*STATIC
*BOUNDARY
Nfix,1,3,0
*DLOAD
Eall,GRAV,9810.,0.,0.,-1
*NODE FILE
U
*EL FILE,OUTPUT=2D
S
*END STEP
