**
** Structure: Simple beam - twistt
** Test objective: C3D8I elements
**
*NODE, NSET=Nall
       1,1.000000000000e+002,1.000000000000e+002,0.000000000000e+000
       2,1.000000000000e+002,7.500000000000e+001,0.000000000000e+000
       3,1.250000000000e+002,7.500000000000e+001,0.000000000000e+000
       4,1.250000000000e+002,1.000000000000e+002,0.000000000000e+000
       5,1.500000000000e+002,7.500000000000e+001,0.000000000000e+000
       6,1.500000000000e+002,1.000000000000e+002,0.000000000000e+000
       7,1.750000000000e+002,7.500000000000e+001,0.000000000000e+000
       8,1.750000000000e+002,1.000000000000e+002,0.000000000000e+000
       9,2.000000000000e+002,7.500000000000e+001,0.000000000000e+000
      10,2.000000000000e+002,1.000000000000e+002,0.000000000000e+000
      11,2.250000000000e+002,7.500000000000e+001,0.000000000000e+000
      12,2.250000000000e+002,1.000000000000e+002,0.000000000000e+000
      13,2.500000000000e+002,7.500000000000e+001,0.000000000000e+000
      14,2.500000000000e+002,1.000000000000e+002,0.000000000000e+000
      15,2.750000000000e+002,7.500000000000e+001,0.000000000000e+000
      16,2.750000000000e+002,1.000000000000e+002,0.000000000000e+000
      17,3.000000000000e+002,7.500000000000e+001,0.000000000000e+000
      18,3.000000000000e+002,1.000000000000e+002,0.000000000000e+000
      19,1.000000000000e+002,5.000000000000e+001,0.000000000000e+000
      20,1.250000000000e+002,5.000000000000e+001,0.000000000000e+000
      21,1.500000000000e+002,5.000000000000e+001,0.000000000000e+000
      22,1.750000000000e+002,5.000000000000e+001,0.000000000000e+000
      23,2.000000000000e+002,5.000000000000e+001,0.000000000000e+000
      24,2.250000000000e+002,5.000000000000e+001,0.000000000000e+000
      25,2.500000000000e+002,5.000000000000e+001,0.000000000000e+000
      26,2.750000000000e+002,5.000000000000e+001,0.000000000000e+000
      27,3.000000000000e+002,5.000000000000e+001,0.000000000000e+000
      28,1.000000000000e+002,2.500000000000e+001,0.000000000000e+000
      29,1.250000000000e+002,2.500000000000e+001,0.000000000000e+000
      30,1.500000000000e+002,2.500000000000e+001,0.000000000000e+000
      31,1.750000000000e+002,2.500000000000e+001,0.000000000000e+000
      32,2.000000000000e+002,2.500000000000e+001,0.000000000000e+000
      33,2.250000000000e+002,2.500000000000e+001,0.000000000000e+000
      34,2.500000000000e+002,2.500000000000e+001,0.000000000000e+000
      35,2.750000000000e+002,2.500000000000e+001,0.000000000000e+000
      36,3.000000000000e+002,2.500000000000e+001,0.000000000000e+000
      37,1.000000000000e+002,0.000000000000e+000,0.000000000000e+000
      38,1.250000000000e+002,0.000000000000e+000,0.000000000000e+000
      39,1.500000000000e+002,0.000000000000e+000,0.000000000000e+000
      40,1.750000000000e+002,0.000000000000e+000,0.000000000000e+000
      41,2.000000000000e+002,0.000000000000e+000,0.000000000000e+000
      42,2.250000000000e+002,0.000000000000e+000,0.000000000000e+000
      43,2.500000000000e+002,0.000000000000e+000,0.000000000000e+000
      44,2.750000000000e+002,0.000000000000e+000,0.000000000000e+000
      45,3.000000000000e+002,0.000000000000e+000,0.000000000000e+000
      46,1.000000000000e+002,7.500000000000e+001,5.000000000000e+000
      47,1.000000000000e+002,1.000000000000e+002,5.000000000000e+000
      48,7.500000000000e+001,1.000000000000e+002,0.000000000000e+000
      49,7.500000000000e+001,7.500000000000e+001,0.000000000000e+000
      50,7.500000000000e+001,7.500000000000e+001,5.000000000000e+000
      51,7.500000000000e+001,1.000000000000e+002,5.000000000000e+000
      52,1.000000000000e+002,7.500000000000e+001,1.000000000000e+001
      53,1.000000000000e+002,1.000000000000e+002,1.000000000000e+001
      54,7.500000000000e+001,7.500000000000e+001,1.000000000000e+001
      55,7.500000000000e+001,1.000000000000e+002,1.000000000000e+001
      56,5.000000000000e+001,1.000000000000e+002,0.000000000000e+000
      57,5.000000000000e+001,7.500000000000e+001,0.000000000000e+000
      58,5.000000000000e+001,7.500000000000e+001,5.000000000000e+000
      59,5.000000000000e+001,1.000000000000e+002,5.000000000000e+000
      60,5.000000000000e+001,7.500000000000e+001,1.000000000000e+001
      61,5.000000000000e+001,1.000000000000e+002,1.000000000000e+001
      62,2.500000000000e+001,1.000000000000e+002,0.000000000000e+000
      63,2.500000000000e+001,7.500000000000e+001,0.000000000000e+000
      64,2.500000000000e+001,7.500000000000e+001,5.000000000000e+000
      65,2.500000000000e+001,1.000000000000e+002,5.000000000000e+000
      66,2.500000000000e+001,7.500000000000e+001,1.000000000000e+001
      67,2.500000000000e+001,1.000000000000e+002,1.000000000000e+001
      68,0.000000000000e+000,1.000000000000e+002,0.000000000000e+000
      69,0.000000000000e+000,7.500000000000e+001,0.000000000000e+000
      70,0.000000000000e+000,7.500000000000e+001,5.000000000000e+000
      71,0.000000000000e+000,1.000000000000e+002,5.000000000000e+000
      72,0.000000000000e+000,7.500000000000e+001,1.000000000000e+001
      73,0.000000000000e+000,1.000000000000e+002,1.000000000000e+001
      74,1.000000000000e+002,5.000000000000e+001,5.000000000000e+000
      75,7.500000000000e+001,5.000000000000e+001,0.000000000000e+000
      76,7.500000000000e+001,5.000000000000e+001,5.000000000000e+000
      77,1.000000000000e+002,5.000000000000e+001,1.000000000000e+001
      78,7.500000000000e+001,5.000000000000e+001,1.000000000000e+001
      79,5.000000000000e+001,5.000000000000e+001,0.000000000000e+000
      80,5.000000000000e+001,5.000000000000e+001,5.000000000000e+000
      81,5.000000000000e+001,5.000000000000e+001,1.000000000000e+001
      82,2.500000000000e+001,5.000000000000e+001,0.000000000000e+000
      83,2.500000000000e+001,5.000000000000e+001,5.000000000000e+000
      84,2.500000000000e+001,5.000000000000e+001,1.000000000000e+001
      85,0.000000000000e+000,5.000000000000e+001,0.000000000000e+000
      86,0.000000000000e+000,5.000000000000e+001,5.000000000000e+000
      87,0.000000000000e+000,5.000000000000e+001,1.000000000000e+001
      88,1.000000000000e+002,2.500000000000e+001,5.000000000000e+000
      89,7.500000000000e+001,2.500000000000e+001,0.000000000000e+000
      90,7.500000000000e+001,2.500000000000e+001,5.000000000000e+000
      91,1.000000000000e+002,2.500000000000e+001,1.000000000000e+001
      92,7.500000000000e+001,2.500000000000e+001,1.000000000000e+001
      93,5.000000000000e+001,2.500000000000e+001,0.000000000000e+000
      94,5.000000000000e+001,2.500000000000e+001,5.000000000000e+000
      95,5.000000000000e+001,2.500000000000e+001,1.000000000000e+001
      96,2.500000000000e+001,2.500000000000e+001,0.000000000000e+000
      97,2.500000000000e+001,2.500000000000e+001,5.000000000000e+000
      98,2.500000000000e+001,2.500000000000e+001,1.000000000000e+001
      99,0.000000000000e+000,2.500000000000e+001,0.000000000000e+000
     100,0.000000000000e+000,2.500000000000e+001,5.000000000000e+000
     101,0.000000000000e+000,2.500000000000e+001,1.000000000000e+001
     102,1.000000000000e+002,0.000000000000e+000,5.000000000000e+000
     103,7.500000000000e+001,0.000000000000e+000,0.000000000000e+000
     104,7.500000000000e+001,0.000000000000e+000,5.000000000000e+000
     105,1.000000000000e+002,0.000000000000e+000,1.000000000000e+001
     106,7.500000000000e+001,0.000000000000e+000,1.000000000000e+001
     107,5.000000000000e+001,0.000000000000e+000,0.000000000000e+000
     108,5.000000000000e+001,0.000000000000e+000,5.000000000000e+000
     109,5.000000000000e+001,0.000000000000e+000,1.000000000000e+001
     110,2.500000000000e+001,0.000000000000e+000,0.000000000000e+000
     111,2.500000000000e+001,0.000000000000e+000,5.000000000000e+000
     112,2.500000000000e+001,0.000000000000e+000,1.000000000000e+001
     113,0.000000000000e+000,0.000000000000e+000,0.000000000000e+000
     114,0.000000000000e+000,0.000000000000e+000,5.000000000000e+000
     115,0.000000000000e+000,0.000000000000e+000,1.000000000000e+001
     116,0.000000000000e+000,7.500000000000e+001,-5.000000000000e+000
     117,0.000000000000e+000,1.000000000000e+002,-5.000000000000e+000
     118,2.500000000000e+001,7.500000000000e+001,-5.000000000000e+000
     119,2.500000000000e+001,1.000000000000e+002,-5.000000000000e+000
     120,0.000000000000e+000,7.500000000000e+001,-1.000000000000e+001
     121,0.000000000000e+000,1.000000000000e+002,-1.000000000000e+001
     122,2.500000000000e+001,7.500000000000e+001,-1.000000000000e+001
     123,2.500000000000e+001,1.000000000000e+002,-1.000000000000e+001
     124,5.000000000000e+001,7.500000000000e+001,-5.000000000000e+000
     125,5.000000000000e+001,1.000000000000e+002,-5.000000000000e+000
     126,5.000000000000e+001,7.500000000000e+001,-1.000000000000e+001
     127,5.000000000000e+001,1.000000000000e+002,-1.000000000000e+001
     128,7.500000000000e+001,7.500000000000e+001,-5.000000000000e+000
     129,7.500000000000e+001,1.000000000000e+002,-5.000000000000e+000
     130,7.500000000000e+001,7.500000000000e+001,-1.000000000000e+001
     131,7.500000000000e+001,1.000000000000e+002,-1.000000000000e+001
     132,1.000000000000e+002,7.500000000000e+001,-5.000000000000e+000
     133,1.000000000000e+002,1.000000000000e+002,-5.000000000000e+000
     134,1.000000000000e+002,7.500000000000e+001,-1.000000000000e+001
     135,1.000000000000e+002,1.000000000000e+002,-1.000000000000e+001
     136,0.000000000000e+000,5.000000000000e+001,-5.000000000000e+000
     137,2.500000000000e+001,5.000000000000e+001,-5.000000000000e+000
     138,0.000000000000e+000,5.000000000000e+001,-1.000000000000e+001
     139,2.500000000000e+001,5.000000000000e+001,-1.000000000000e+001
     140,5.000000000000e+001,5.000000000000e+001,-5.000000000000e+000
     141,5.000000000000e+001,5.000000000000e+001,-1.000000000000e+001
     142,7.500000000000e+001,5.000000000000e+001,-5.000000000000e+000
     143,7.500000000000e+001,5.000000000000e+001,-1.000000000000e+001
     144,1.000000000000e+002,5.000000000000e+001,-5.000000000000e+000
     145,1.000000000000e+002,5.000000000000e+001,-1.000000000000e+001
     146,0.000000000000e+000,2.500000000000e+001,-5.000000000000e+000
     147,2.500000000000e+001,2.500000000000e+001,-5.000000000000e+000
     148,0.000000000000e+000,2.500000000000e+001,-1.000000000000e+001
     149,2.500000000000e+001,2.500000000000e+001,-1.000000000000e+001
     150,5.000000000000e+001,2.500000000000e+001,-5.000000000000e+000
     151,5.000000000000e+001,2.500000000000e+001,-1.000000000000e+001
     152,7.500000000000e+001,2.500000000000e+001,-5.000000000000e+000
     153,7.500000000000e+001,2.500000000000e+001,-1.000000000000e+001
     154,1.000000000000e+002,2.500000000000e+001,-5.000000000000e+000
     155,1.000000000000e+002,2.500000000000e+001,-1.000000000000e+001
     156,0.000000000000e+000,0.000000000000e+000,-5.000000000000e+000
     157,2.500000000000e+001,0.000000000000e+000,-5.000000000000e+000
     158,0.000000000000e+000,0.000000000000e+000,-1.000000000000e+001
     159,2.500000000000e+001,0.000000000000e+000,-1.000000000000e+001
     160,5.000000000000e+001,0.000000000000e+000,-5.000000000000e+000
     161,5.000000000000e+001,0.000000000000e+000,-1.000000000000e+001
     162,7.500000000000e+001,0.000000000000e+000,-5.000000000000e+000
     163,7.500000000000e+001,0.000000000000e+000,-1.000000000000e+001
     164,1.000000000000e+002,0.000000000000e+000,-5.000000000000e+000
     165,1.000000000000e+002,0.000000000000e+000,-1.000000000000e+001
*ELEMENT, TYPE=S4, ELSET=Eall1
     1,      1,      2,      3,      4
     2,      4,      3,      5,      6
     3,      6,      5,      7,      8
     4,      8,      7,      9,     10
     5,     10,      9,     11,     12
     6,     12,     11,     13,     14
     7,     14,     13,     15,     16
     8,     16,     15,     17,     18
     9,      2,     19,     20,      3
    10,      3,     20,     21,      5
    11,      5,     21,     22,      7
    12,      7,     22,     23,      9
    13,      9,     23,     24,     11
    14,     11,     24,     25,     13
    15,     13,     25,     26,     15
    16,     15,     26,     27,     17
    17,     19,     28,     29,     20
    18,     20,     29,     30,     21
    19,     21,     30,     31,     22
    20,     22,     31,     32,     23
    21,     23,     32,     33,     24
    22,     24,     33,     34,     25
    23,     25,     34,     35,     26
    24,     26,     35,     36,     27
    25,     28,     37,     38,     29
    26,     29,     38,     39,     30
    27,     30,     39,     40,     31
    28,     31,     40,     41,     32
    29,     32,     41,     42,     33
    30,     33,     42,     43,     34
    31,     34,     43,     44,     35
    32,     35,     44,     45,     36
*ELEMENT, TYPE=C3D8, ELSET=Eall2
    33,     1,     2,    46,    47,    48,    49,    50,    51
    34,    47,    46,    52,    53,    51,    50,    54,    55
    35,    48,    49,    50,    51,    56,    57,    58,    59
    36,    51,    50,    54,    55,    59,    58,    60,    61
    37,    56,    57,    58,    59,    62,    63,    64,    65
    38,    59,    58,    60,    61,    65,    64,    66,    67
    39,    62,    63,    64,    65,    68,    69,    70,    71
    40,    65,    64,    66,    67,    71,    70,    72,    73
    41,     2,    19,    74,    46,    49,    75,    76,    50
    42,    46,    74,    77,    52,    50,    76,    78,    54
    43,    49,    75,    76,    50,    57,    79,    80,    58
    44,    50,    76,    78,    54,    58,    80,    81,    60
    45,    57,    79,    80,    58,    63,    82,    83,    64
    46,    58,    80,    81,    60,    64,    83,    84,    66
    47,    63,    82,    83,    64,    69,    85,    86,    70
    48,    64,    83,    84,    66,    70,    86,    87,    72
    49,    19,    28,    88,    74,    75,    89,    90,    76
    50,    74,    88,    91,    77,    76,    90,    92,    78
    51,    75,    89,    90,    76,    79,    93,    94,    80
    52,    76,    90,    92,    78,    80,    94,    95,    81
    53,    79,    93,    94,    80,    82,    96,    97,    83
    54,    80,    94,    95,    81,    83,    97,    98,    84
    55,    82,    96,    97,    83,    85,    99,   100,    86
    56,    83,    97,    98,    84,    86,   100,   101,    87
    57,    28,    37,   102,    88,    89,   103,   104,    90
    58,    88,   102,   105,    91,    90,   104,   106,    92
    59,    89,   103,   104,    90,    93,   107,   108,    94
    60,    90,   104,   106,    92,    94,   108,   109,    95
    61,    93,   107,   108,    94,    96,   110,   111,    97
    62,    94,   108,   109,    95,    97,   111,   112,    98
    63,    96,   110,   111,    97,    99,   113,   114,   100
    64,    97,   111,   112,    98,   100,   114,   115,   101
    65,    68,    69,   116,   117,    62,    63,   118,   119
    66,   117,   116,   120,   121,   119,   118,   122,   123
    67,    62,    63,   118,   119,    56,    57,   124,   125
    68,   119,   118,   122,   123,   125,   124,   126,   127
    69,    56,    57,   124,   125,    48,    49,   128,   129
    70,   125,   124,   126,   127,   129,   128,   130,   131
    71,    48,    49,   128,   129,     1,     2,   132,   133
    72,   129,   128,   130,   131,   133,   132,   134,   135
    73,    69,    85,   136,   116,    63,    82,   137,   118
    74,   116,   136,   138,   120,   118,   137,   139,   122
    75,    63,    82,   137,   118,    57,    79,   140,   124
    76,   118,   137,   139,   122,   124,   140,   141,   126
    77,    57,    79,   140,   124,    49,    75,   142,   128
    78,   124,   140,   141,   126,   128,   142,   143,   130
    79,    49,    75,   142,   128,     2,    19,   144,   132
    80,   128,   142,   143,   130,   132,   144,   145,   134
    81,    85,    99,   146,   136,    82,    96,   147,   137
    82,   136,   146,   148,   138,   137,   147,   149,   139
    83,    82,    96,   147,   137,    79,    93,   150,   140
    84,   137,   147,   149,   139,   140,   150,   151,   141
    85,    79,    93,   150,   140,    75,    89,   152,   142
    86,   140,   150,   151,   141,   142,   152,   153,   143
    87,    75,    89,   152,   142,    19,    28,   154,   144
    88,   142,   152,   153,   143,   144,   154,   155,   145
    89,    99,   113,   156,   146,    96,   110,   157,   147
    90,   146,   156,   158,   148,   147,   157,   159,   149
    91,    96,   110,   157,   147,    93,   107,   160,   150
    92,   147,   157,   159,   149,   150,   160,   161,   151
    93,    93,   107,   160,   150,    89,   103,   162,   152
    94,   150,   160,   161,   151,   152,   162,   163,   153
    95,    89,   103,   162,   152,    28,    37,   164,   154
    96,   152,   162,   163,   153,   154,   164,   165,   155
** Names based on support
*NSET,NSET=Nsupport
68,
69,
70,
71,
72,
73,
85,
86,
87,
99,
100,
101,
113,
114,
115,
116,
117,
120,
121,
136,
138,
146,
148,
156,
158,
** Names based on rigid
*NSET,NSET=Nrigid
1,
2,
19,
28,
37,
46,
47,
52,
53,
74,
77,
88,
91,
102,
105,
132,
133,
134,
135,
144,
145,
154,
155,
164,
165,
*MATERIAL, NAME=Steel
*ELASTIC
210000,0.3
*SOLID SECTION, ELSET=Eall2, MATERIAL=Steel
*SHELL SECTION, MATERIAL=Steel, ELSET=Eall1
20.0
*RIGID BODY,NSET=Nrigid
*STEP
*STATIC
*BOUNDARY
Nsupport, 1,3
*CLOAD
36, 3, -1000
27, 3, -1000
17, 3, -1000
45, 3, -500
18, 3, -500
*NODE FILE
U
*EL FILE
S
*END STEP
