** Generated by Mecway 11.1
*NODE
1,0,0,0
2,1,0,0
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*ELEMENT,TYPE=C3D8
1,54,4228,4240,4231,11610,11614,11619,11617
2,4228,1378,4229,4240,11614,11611,11615,11619
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*ELSET,ELSET=Default
1
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*MATERIAL,NAME=Material
*ELASTIC,TYPE=ISOTROPIC
200000000000,0.3
*DENSITY
7800
*SOLID SECTION,ELSET=Default,MATERIAL=Material
*BOUNDARY
1,1,,0
1,2,,0
1,3,,0
2,1,,0
2,2,,0
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11502,3,,0
*STEP
*FREQUENCY
10
*NODE FILE,GLOBAL=YES
U
*END STEP
