** Generated by Mecway 11.0
*NODE
1,0.3,0.1,0.08
2,0.2,0,0.04
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*ELEMENT,TYPE=C3D8
1,414,454,460,421,415,455,21,422
2,658,698,704,665,659,699,22,666
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*NSET,NSET=LH
2
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*NSET,NSET=RH
1
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*ELSET,ELSET=Default
1
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*MATERIAL,NAME=Material
*ELASTIC,TYPE=ISOTROPIC
200000000000,0.3
*SOLID SECTION,ELSET=Default,MATERIAL=Material
*SUBMODEL,TYPE=NODE,INPUT=beam.frd
LH,
RH
*STEP
*STATIC
**STATIC,SOLVER=PARDISO
*BOUNDARY,SUBMODEL,STEP=1
LH,1,3
RH,1,3
*NODE FILE,GLOBAL=YES
U,RF
*EL FILE
S,E,ENER
*END STEP
