*Heading
Modell: Switch Calculix Model
Autor:Anaon
Datum: 26.10.2014
**Definition der Knoten
*Node, NSET=NALL
      1,  2.5 , 0.05
      2,  2.5 , 0.
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 **Definition der Elemente/Three-node plane stress element
*Element, type=CPS3 ,ELSET=EALL
  1,   1, 133,   2
  2, 133,  25, 213
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
*NSET, NSET=N1
1,2

*NSET, NSET=N12
81,82,83,84,85,207,208,209,210,211,212

*NSET,NSET=SET_Displacement
 46,  47,  48,  49,  50, 160, 161, 162, 163, 164, 165

*NSET,NSET=SET_Displacement2
 59,  60,  61,  62,  63, 179, 180, 181, 182, 183, 184

*BOUNDARY
N1,2,2
N12,1,2

*MATERIAL,NAME=Steel
*ELASTIC
210000.,.3
** Section: Switch
*SOLID SECTION, ELSET=Eall, MATERIAL=Steel
*SURFACE,NAME=Smast
1,   S1
2,   S1
3,   S2
4,   S2
5,   S2
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137, S2
*SURFACE,Name=Sslav
71,  S3
73,  S1
74,  S1
76,  S2
77,  S2
79,  S1
170, S1
171, S2
173, S1
174, S2
176, S1
*CONTACT PAIR,INTERACTION=Cont,TYPE= SURFACE TO SURFACE
Sslav,Smast
*SURFACE INTERACTION,NAME=Cont
**Friction
**0.01
*SURFACE BEHAVIOR,PRESSURE-OVERCLOSURE=EXPONENTIAL
0.001,1
**The parameters c0 and p0 define the kind of contact.
**p0 is the contact pressure at zero distance, c0 is the distance from the master surface at which the pressureis decreased to 1% of p0.
**A large value of c0 leads to softcontact, a small value to hard contact.

**Erste Verschiebung mit -0.5 in Y-Richtung (Gesamtzeit des Steps=1 und Zeitinkrement zu Beginn=0,1)
*STEP
*STATIC
0.1,1.

*BOUNDARY
SET_Displacement,2,2,-.5

*CONTACT PRINT,
CSTR,CDIS
*CONTACT OUTPUT
CSTR,CDIS
*CONTACT FILE
CSTR,CDIS,
*NODE FILE
U
*EL FILE
S
*END STEP

**Zweite statische Belastung mit -0.5N in Y-Richtung (Gesamtzeit des Steps=1 und Zeitintervall=0,1)
*STEP
*STATIC
0.1,1.
*BOUNDARY
SET_Displacement2,2,2,-.5

*CONTACT Print,
CSTR,CDIS
*CONTACT OUTPUT
CSTR,CDIS
*CONTACT FILE
CSTR,CDIS,
*NODE FILE
U
*EL FILE
S
*END STEP
