*Heading
 C:\_testkonv\spec\msh\surt2.inp
*Node,NSET=Nall
1,0.000000000000e+000,0.000000000000e+000,0.000000000000e+000
2,1.000000000000e+001,0.000000000000e+000,0.000000000000e+000
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*NSET,NSET=ln1
1
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*NSET,NSET=ln2
2
41
40
42
3
*NSET,NSET=ln3
3
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*NSET,NSET=ln4
4
79
78
80
1
*Element, type=S6, ELSET=sur6
41, 16, 90, 15, 134, 135, 33
42, 90, 91, 15, 136, 137, 135
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

*MATERIAL,NAME=Steel
*ELASTIC
2.9000E+07,0.3
*DENSITY
7.3500E-04

*SHELL SECTION,MATERIAL=Steel,ELSET=sur6
1


*BOUNDARY
ln4,1,6,0

**Here is experimental nodal group
*NSET,NSET=nodes
2,
3,
2,
2,
2,


*STEP
*STATIC
*CLOAD
nodes,3,-10000
*NODE FILE,OUTPUT=3D
U
*EL FILE
S,U
*END STEP
