*NODE, NSET=Nall
       0,5.000000000000e+001,5.000000000000e+001,3.000000000000e+002
       1,0.000000000000e+000,1.000000000000e+002,0.000000000000e+000
       2,0.000000000000e+000,7.500000000000e+001,0.000000000000e+000
       3,0.000000000000e+000,7.500000000000e+001,3.000000000000e+001
       4,0.000000000000e+000,1.000000000000e+002,3.000000000000e+001
       5,0.000000000000e+000,7.500000000000e+001,6.000000000000e+001
       6,0.000000000000e+000,1.000000000000e+002,6.000000000000e+001
       7,0.000000000000e+000,7.500000000000e+001,9.000000000000e+001
       8,0.000000000000e+000,1.000000000000e+002,9.000000000000e+001
       9,0.000000000000e+000,7.500000000000e+001,1.200000000000e+002
      10,0.000000000000e+000,1.000000000000e+002,1.200000000000e+002
      11,0.000000000000e+000,7.500000000000e+001,1.500000000000e+002
      12,0.000000000000e+000,1.000000000000e+002,1.500000000000e+002
      13,0.000000000000e+000,7.500000000000e+001,1.800000000000e+002
      14,0.000000000000e+000,1.000000000000e+002,1.800000000000e+002
      15,0.000000000000e+000,7.500000000000e+001,2.100000000000e+002
      16,0.000000000000e+000,1.000000000000e+002,2.100000000000e+002
      17,0.000000000000e+000,7.500000000000e+001,2.400000000000e+002
      18,0.000000000000e+000,1.000000000000e+002,2.400000000000e+002
      19,0.000000000000e+000,7.500000000000e+001,2.700000000000e+002
      20,0.000000000000e+000,1.000000000000e+002,2.700000000000e+002
      21,0.000000000000e+000,7.500000000000e+001,3.000000000000e+002
      22,0.000000000000e+000,1.000000000000e+002,3.000000000000e+002
      23,0.000000000000e+000,5.000000000000e+001,0.000000000000e+000
      24,0.000000000000e+000,5.000000000000e+001,3.000000000000e+001
      25,0.000000000000e+000,5.000000000000e+001,6.000000000000e+001
      26,0.000000000000e+000,5.000000000000e+001,9.000000000000e+001
      27,0.000000000000e+000,5.000000000000e+001,1.200000000000e+002
      28,0.000000000000e+000,5.000000000000e+001,1.500000000000e+002
      29,0.000000000000e+000,5.000000000000e+001,1.800000000000e+002
      30,0.000000000000e+000,5.000000000000e+001,2.100000000000e+002
      31,0.000000000000e+000,5.000000000000e+001,2.400000000000e+002
      32,0.000000000000e+000,5.000000000000e+001,2.700000000000e+002
      33,0.000000000000e+000,5.000000000000e+001,3.000000000000e+002
      34,0.000000000000e+000,2.500000000000e+001,0.000000000000e+000
      35,0.000000000000e+000,2.500000000000e+001,3.000000000000e+001
      36,0.000000000000e+000,2.500000000000e+001,6.000000000000e+001
      37,0.000000000000e+000,2.500000000000e+001,9.000000000000e+001
      38,0.000000000000e+000,2.500000000000e+001,1.200000000000e+002
      39,0.000000000000e+000,2.500000000000e+001,1.500000000000e+002
      40,0.000000000000e+000,2.500000000000e+001,1.800000000000e+002
      41,0.000000000000e+000,2.500000000000e+001,2.100000000000e+002
      42,0.000000000000e+000,2.500000000000e+001,2.400000000000e+002
      43,0.000000000000e+000,2.500000000000e+001,2.700000000000e+002
      44,0.000000000000e+000,2.500000000000e+001,3.000000000000e+002
      45,0.000000000000e+000,0.000000000000e+000,0.000000000000e+000
      46,0.000000000000e+000,0.000000000000e+000,3.000000000000e+001
      47,0.000000000000e+000,0.000000000000e+000,6.000000000000e+001
      48,0.000000000000e+000,0.000000000000e+000,9.000000000000e+001
      49,0.000000000000e+000,0.000000000000e+000,1.200000000000e+002
      50,0.000000000000e+000,0.000000000000e+000,1.500000000000e+002
      51,0.000000000000e+000,0.000000000000e+000,1.800000000000e+002
      52,0.000000000000e+000,0.000000000000e+000,2.100000000000e+002
      53,0.000000000000e+000,0.000000000000e+000,2.400000000000e+002
      54,0.000000000000e+000,0.000000000000e+000,2.700000000000e+002
      55,0.000000000000e+000,0.000000000000e+000,3.000000000000e+002
      56,1.000000000000e+002,1.000000000000e+002,0.000000000000e+000
      57,7.500000000000e+001,1.000000000000e+002,0.000000000000e+000
      58,7.500000000000e+001,1.000000000000e+002,3.000000000000e+001
      59,1.000000000000e+002,1.000000000000e+002,3.000000000000e+001
      60,7.500000000000e+001,1.000000000000e+002,6.000000000000e+001
      61,1.000000000000e+002,1.000000000000e+002,6.000000000000e+001
      62,7.500000000000e+001,1.000000000000e+002,9.000000000000e+001
      63,1.000000000000e+002,1.000000000000e+002,9.000000000000e+001
      64,7.500000000000e+001,1.000000000000e+002,1.200000000000e+002
      65,1.000000000000e+002,1.000000000000e+002,1.200000000000e+002
      66,7.500000000000e+001,1.000000000000e+002,1.500000000000e+002
      67,1.000000000000e+002,1.000000000000e+002,1.500000000000e+002
      68,7.500000000000e+001,1.000000000000e+002,1.800000000000e+002
      69,1.000000000000e+002,1.000000000000e+002,1.800000000000e+002
      70,7.500000000000e+001,1.000000000000e+002,2.100000000000e+002
      71,1.000000000000e+002,1.000000000000e+002,2.100000000000e+002
      72,7.500000000000e+001,1.000000000000e+002,2.400000000000e+002
      73,1.000000000000e+002,1.000000000000e+002,2.400000000000e+002
      74,7.500000000000e+001,1.000000000000e+002,2.700000000000e+002
      75,1.000000000000e+002,1.000000000000e+002,2.700000000000e+002
      76,7.500000000000e+001,1.000000000000e+002,3.000000000000e+002
      77,1.000000000000e+002,1.000000000000e+002,3.000000000000e+002
      78,5.000000000000e+001,1.000000000000e+002,0.000000000000e+000
      79,5.000000000000e+001,1.000000000000e+002,3.000000000000e+001
      80,5.000000000000e+001,1.000000000000e+002,6.000000000000e+001
      81,5.000000000000e+001,1.000000000000e+002,9.000000000000e+001
      82,5.000000000000e+001,1.000000000000e+002,1.200000000000e+002
      83,5.000000000000e+001,1.000000000000e+002,1.500000000000e+002
      84,5.000000000000e+001,1.000000000000e+002,1.800000000000e+002
      85,5.000000000000e+001,1.000000000000e+002,2.100000000000e+002
      86,5.000000000000e+001,1.000000000000e+002,2.400000000000e+002
      87,5.000000000000e+001,1.000000000000e+002,2.700000000000e+002
      88,5.000000000000e+001,1.000000000000e+002,3.000000000000e+002
      89,2.500000000000e+001,1.000000000000e+002,0.000000000000e+000
      90,2.500000000000e+001,1.000000000000e+002,3.000000000000e+001
      91,2.500000000000e+001,1.000000000000e+002,6.000000000000e+001
      92,2.500000000000e+001,1.000000000000e+002,9.000000000000e+001
      93,2.500000000000e+001,1.000000000000e+002,1.200000000000e+002
      94,2.500000000000e+001,1.000000000000e+002,1.500000000000e+002
      95,2.500000000000e+001,1.000000000000e+002,1.800000000000e+002
      96,2.500000000000e+001,1.000000000000e+002,2.100000000000e+002
      97,2.500000000000e+001,1.000000000000e+002,2.400000000000e+002
      98,2.500000000000e+001,1.000000000000e+002,2.700000000000e+002
      99,2.500000000000e+001,1.000000000000e+002,3.000000000000e+002
     100,1.000000000000e+002,0.000000000000e+000,0.000000000000e+000
     101,1.000000000000e+002,2.500000000000e+001,0.000000000000e+000
     102,1.000000000000e+002,2.500000000000e+001,3.000000000000e+001
     103,1.000000000000e+002,0.000000000000e+000,3.000000000000e+001
     104,1.000000000000e+002,2.500000000000e+001,6.000000000000e+001
     105,1.000000000000e+002,0.000000000000e+000,6.000000000000e+001
     106,1.000000000000e+002,2.500000000000e+001,9.000000000000e+001
     107,1.000000000000e+002,0.000000000000e+000,9.000000000000e+001
     108,1.000000000000e+002,2.500000000000e+001,1.200000000000e+002
     109,1.000000000000e+002,0.000000000000e+000,1.200000000000e+002
     110,1.000000000000e+002,2.500000000000e+001,1.500000000000e+002
     111,1.000000000000e+002,0.000000000000e+000,1.500000000000e+002
     112,1.000000000000e+002,2.500000000000e+001,1.800000000000e+002
     113,1.000000000000e+002,0.000000000000e+000,1.800000000000e+002
     114,1.000000000000e+002,2.500000000000e+001,2.100000000000e+002
     115,1.000000000000e+002,0.000000000000e+000,2.100000000000e+002
     116,1.000000000000e+002,2.500000000000e+001,2.400000000000e+002
     117,1.000000000000e+002,0.000000000000e+000,2.400000000000e+002
     118,1.000000000000e+002,2.500000000000e+001,2.700000000000e+002
     119,1.000000000000e+002,0.000000000000e+000,2.700000000000e+002
     120,1.000000000000e+002,2.500000000000e+001,3.000000000000e+002
     121,1.000000000000e+002,0.000000000000e+000,3.000000000000e+002
     122,1.000000000000e+002,5.000000000000e+001,0.000000000000e+000
     123,1.000000000000e+002,5.000000000000e+001,3.000000000000e+001
     124,1.000000000000e+002,5.000000000000e+001,6.000000000000e+001
     125,1.000000000000e+002,5.000000000000e+001,9.000000000000e+001
     126,1.000000000000e+002,5.000000000000e+001,1.200000000000e+002
     127,1.000000000000e+002,5.000000000000e+001,1.500000000000e+002
     128,1.000000000000e+002,5.000000000000e+001,1.800000000000e+002
     129,1.000000000000e+002,5.000000000000e+001,2.100000000000e+002
     130,1.000000000000e+002,5.000000000000e+001,2.400000000000e+002
     131,1.000000000000e+002,5.000000000000e+001,2.700000000000e+002
     132,1.000000000000e+002,5.000000000000e+001,3.000000000000e+002
     133,1.000000000000e+002,7.500000000000e+001,0.000000000000e+000
     134,1.000000000000e+002,7.500000000000e+001,3.000000000000e+001
     135,1.000000000000e+002,7.500000000000e+001,6.000000000000e+001
     136,1.000000000000e+002,7.500000000000e+001,9.000000000000e+001
     137,1.000000000000e+002,7.500000000000e+001,1.200000000000e+002
     138,1.000000000000e+002,7.500000000000e+001,1.500000000000e+002
     139,1.000000000000e+002,7.500000000000e+001,1.800000000000e+002
     140,1.000000000000e+002,7.500000000000e+001,2.100000000000e+002
     141,1.000000000000e+002,7.500000000000e+001,2.400000000000e+002
     142,1.000000000000e+002,7.500000000000e+001,2.700000000000e+002
     143,1.000000000000e+002,7.500000000000e+001,3.000000000000e+002
     144,2.500000000000e+001,0.000000000000e+000,0.000000000000e+000
     145,2.500000000000e+001,0.000000000000e+000,3.000000000000e+001
     146,2.500000000000e+001,0.000000000000e+000,6.000000000000e+001
     147,2.500000000000e+001,0.000000000000e+000,9.000000000000e+001
     148,2.500000000000e+001,0.000000000000e+000,1.200000000000e+002
     149,2.500000000000e+001,0.000000000000e+000,1.500000000000e+002
     150,2.500000000000e+001,0.000000000000e+000,1.800000000000e+002
     151,2.500000000000e+001,0.000000000000e+000,2.100000000000e+002
     152,2.500000000000e+001,0.000000000000e+000,2.400000000000e+002
     153,2.500000000000e+001,0.000000000000e+000,2.700000000000e+002
     154,2.500000000000e+001,0.000000000000e+000,3.000000000000e+002
     155,5.000000000000e+001,0.000000000000e+000,0.000000000000e+000
     156,5.000000000000e+001,0.000000000000e+000,3.000000000000e+001
     157,5.000000000000e+001,0.000000000000e+000,6.000000000000e+001
     158,5.000000000000e+001,0.000000000000e+000,9.000000000000e+001
     159,5.000000000000e+001,0.000000000000e+000,1.200000000000e+002
     160,5.000000000000e+001,0.000000000000e+000,1.500000000000e+002
     161,5.000000000000e+001,0.000000000000e+000,1.800000000000e+002
     162,5.000000000000e+001,0.000000000000e+000,2.100000000000e+002
     163,5.000000000000e+001,0.000000000000e+000,2.400000000000e+002
     164,5.000000000000e+001,0.000000000000e+000,2.700000000000e+002
     165,5.000000000000e+001,0.000000000000e+000,3.000000000000e+002
     166,7.500000000000e+001,0.000000000000e+000,0.000000000000e+000
     167,7.500000000000e+001,0.000000000000e+000,3.000000000000e+001
     168,7.500000000000e+001,0.000000000000e+000,6.000000000000e+001
     169,7.500000000000e+001,0.000000000000e+000,9.000000000000e+001
     170,7.500000000000e+001,0.000000000000e+000,1.200000000000e+002
     171,7.500000000000e+001,0.000000000000e+000,1.500000000000e+002
     172,7.500000000000e+001,0.000000000000e+000,1.800000000000e+002
     173,7.500000000000e+001,0.000000000000e+000,2.100000000000e+002
     174,7.500000000000e+001,0.000000000000e+000,2.400000000000e+002
     175,7.500000000000e+001,0.000000000000e+000,2.700000000000e+002
     176,7.500000000000e+001,0.000000000000e+000,3.000000000000e+002
*ELEMENT, TYPE=S4, ELSET=Eall
     1,      1,      2,      3,      4
     2,      4,      3,      5,      6
     3,      6,      5,      7,      8
     4,      8,      7,      9,     10
     5,     10,      9,     11,     12
     6,     12,     11,     13,     14
     7,     14,     13,     15,     16
     8,     16,     15,     17,     18
     9,     18,     17,     19,     20
    10,     20,     19,     21,     22
    11,      2,     23,     24,      3
    12,      3,     24,     25,      5
    13,      5,     25,     26,      7
    14,      7,     26,     27,      9
    15,      9,     27,     28,     11
    16,     11,     28,     29,     13
    17,     13,     29,     30,     15
    18,     15,     30,     31,     17
    19,     17,     31,     32,     19
    20,     19,     32,     33,     21
    21,     23,     34,     35,     24
    22,     24,     35,     36,     25
    23,     25,     36,     37,     26
    24,     26,     37,     38,     27
    25,     27,     38,     39,     28
    26,     28,     39,     40,     29
    27,     29,     40,     41,     30
    28,     30,     41,     42,     31
    29,     31,     42,     43,     32
    30,     32,     43,     44,     33
    31,     34,     45,     46,     35
    32,     35,     46,     47,     36
    33,     36,     47,     48,     37
    34,     37,     48,     49,     38
    35,     38,     49,     50,     39
    36,     39,     50,     51,     40
    37,     40,     51,     52,     41
    38,     41,     52,     53,     42
    39,     42,     53,     54,     43
    40,     43,     54,     55,     44
    41,     56,     57,     58,     59
    42,     59,     58,     60,     61
    43,     61,     60,     62,     63
    44,     63,     62,     64,     65
    45,     65,     64,     66,     67
    46,     67,     66,     68,     69
    47,     69,     68,     70,     71
    48,     71,     70,     72,     73
    49,     73,     72,     74,     75
    50,     75,     74,     76,     77
    51,     57,     78,     79,     58
    52,     58,     79,     80,     60
    53,     60,     80,     81,     62
    54,     62,     81,     82,     64
    55,     64,     82,     83,     66
    56,     66,     83,     84,     68
    57,     68,     84,     85,     70
    58,     70,     85,     86,     72
    59,     72,     86,     87,     74
    60,     74,     87,     88,     76
    61,     78,     89,     90,     79
    62,     79,     90,     91,     80
    63,     80,     91,     92,     81
    64,     81,     92,     93,     82
    65,     82,     93,     94,     83
    66,     83,     94,     95,     84
    67,     84,     95,     96,     85
    68,     85,     96,     97,     86
    69,     86,     97,     98,     87
    70,     87,     98,     99,     88
    71,     89,      1,      4,     90
    72,     90,      4,      6,     91
    73,     91,      6,      8,     92
    74,     92,      8,     10,     93
    75,     93,     10,     12,     94
    76,     94,     12,     14,     95
    77,     95,     14,     16,     96
    78,     96,     16,     18,     97
    79,     97,     18,     20,     98
    80,     98,     20,     22,     99
    81,    100,    101,    102,    103
    82,    103,    102,    104,    105
    83,    105,    104,    106,    107
    84,    107,    106,    108,    109
    85,    109,    108,    110,    111
    86,    111,    110,    112,    113
    87,    113,    112,    114,    115
    88,    115,    114,    116,    117
    89,    117,    116,    118,    119
    90,    119,    118,    120,    121
    91,    101,    122,    123,    102
    92,    102,    123,    124,    104
    93,    104,    124,    125,    106
    94,    106,    125,    126,    108
    95,    108,    126,    127,    110
    96,    110,    127,    128,    112
    97,    112,    128,    129,    114
    98,    114,    129,    130,    116
    99,    116,    130,    131,    118
   100,    118,    131,    132,    120
   101,    122,    133,    134,    123
   102,    123,    134,    135,    124
   103,    124,    135,    136,    125
   104,    125,    136,    137,    126
   105,    126,    137,    138,    127
   106,    127,    138,    139,    128
   107,    128,    139,    140,    129
   108,    129,    140,    141,    130
   109,    130,    141,    142,    131
   110,    131,    142,    143,    132
   111,    133,     56,     59,    134
   112,    134,     59,     61,    135
   113,    135,     61,     63,    136
   114,    136,     63,     65,    137
   115,    137,     65,     67,    138
   116,    138,     67,     69,    139
   117,    139,     69,     71,    140
   118,    140,     71,     73,    141
   119,    141,     73,     75,    142
   120,    142,     75,     77,    143
   121,     45,    144,    145,     46
   122,     46,    145,    146,     47
   123,     47,    146,    147,     48
   124,     48,    147,    148,     49
   125,     49,    148,    149,     50
   126,     50,    149,    150,     51
   127,     51,    150,    151,     52
   128,     52,    151,    152,     53
   129,     53,    152,    153,     54
   130,     54,    153,    154,     55
   131,    144,    155,    156,    145
   132,    145,    156,    157,    146
   133,    146,    157,    158,    147
   134,    147,    158,    159,    148
   135,    148,    159,    160,    149
   136,    149,    160,    161,    150
   137,    150,    161,    162,    151
   138,    151,    162,    163,    152
   139,    152,    163,    164,    153
   140,    153,    164,    165,    154
   141,    155,    166,    167,    156
   142,    156,    167,    168,    157
   143,    157,    168,    169,    158
   144,    158,    169,    170,    159
   145,    159,    170,    171,    160
   146,    160,    171,    172,    161
   147,    161,    172,    173,    162
   148,    162,    173,    174,    163
   149,    163,    174,    175,    164
   150,    164,    175,    176,    165
   151,    166,    100,    103,    167
   152,    167,    103,    105,    168
   153,    168,    105,    107,    169
   154,    169,    107,    109,    170
   155,    170,    109,    111,    171
   156,    171,    111,    113,    172
   157,    172,    113,    115,    173
   158,    173,    115,    117,    174
   159,    174,    117,    119,    175
   160,    175,    119,    121,    176

*NSET,NSET=Nfix
1,
2,
23,
34,
45,
56,
57,
78,
89,
100,
101,
122,
133,
144,
155,
166,
*NSET,NSET=Nload
21,
22,
33,
44,
55,
76,
77,
88,
99,
120,
121,
132,
143,
154,
165,
176,
*MATERIAL, Name=Mat1
*ELASTIC
 210000.,.3
*SHELL SECTION,MATERIAL=Mat1,ELSET=Eall
 5.0
*BOUNDARY
 Nfix,1,3
*STEP
*STATIC
*CLOAD
 Nload,3,100.
*NODE FILE
 U
*EL FILE
 S, E
*END STEP
