** ***************************************************************************
**   Written by : STARMAP
**   Version    : 4.51
**   From Model : F:\WORK\SEIG\EIG1.MOD
**   Date       : Thu May 01 13:24:59 2014
** ***************************************************************************
**
*NODE, NSET=GLOBAL
       1,          0.,          0.,          0.
       2,          0.,          0.,         7.2
       3,          0.,          0.,        14.4
       4,          0.,          0.,        21.6
       5,          0.,          0.,        28.8
       6,          0.,          0.,         36.
       7,          0.,          0.,        43.2
       8,          0.,          0.,        50.4
       9,          0.,          0.,        57.6
      10,          0.,          0.,        64.8
      11,          0.,          0.,         72.
      12,          0.,          0.,        79.2
      13,          0.,          0.,        86.4
      14,          0.,          0.,        93.6
      15,          0.,          0.,       100.8
      16,          0.,          0.,        108.
      17,          0.,          0.,       115.2
      18,          0.,          0.,       122.4
      19,          0.,          0.,       129.6
      20,          0.,          0.,       136.8
      21,          0.,          0.,        144.
      22,          0.,          0.,       151.2
      23,          0.,          0.,       158.4
      24,          0.,          0.,       165.6
      25,          0.,          0.,       172.8
      26,          0.,          0.,        180.
      27,          0.,          0.,       187.2
      28,          0.,          0.,       194.4
      29,          0.,          0.,       201.6
      30,          0.,          0.,       208.8
      31,          0.,          0.,        216.
      32,          0.,          0.,       223.2
      33,          0.,          0.,       230.4
      34,          0.,          0.,       237.6
      35,          0.,          0.,       244.8
      36,          0.,          0.,        252.
      37,          0.,          0.,       259.2
      38,          0.,          0.,       266.4
      39,          0.,          0.,       273.6
      40,          0.,          0.,       280.8
      41,          0.,          0.,        288.
      42,          0.,          0.,       295.2
      43,          0.,          0.,       302.4
      44,          0.,          0.,       309.6
      45,          0.,          0.,       316.8
      46,          0.,          0.,        324.
      47,          0.,          0.,       331.2
      48,          0.,          0.,       338.4
      49,          0.,          0.,       345.6
      50,          0.,          0.,       352.8
      51,          0.,          0.,        360.
      52,          0.,          0.,       367.2
      53,          0.,          0.,       374.4
      54,          0.,          0.,       381.6
      55,          0.,          0.,       388.8
      56,          0.,          0.,        396.
      57,          0.,          0.,       403.2
      58,          0.,          0.,       410.4
      59,          0.,          0.,       417.6
      60,          0.,          0.,       424.8
      61,          0.,          0.,        432.
      62,          0.,          0.,       439.2
      63,          0.,          0.,       446.4
      64,          0.,          0.,       453.6
      65,          0.,          0.,       460.8
      66,          0.,          0.,        468.
      67,          0.,          0.,       475.2
      68,          0.,          0.,       482.4
      69,          0.,          0.,       489.6
      70,          0.,          0.,       496.8
      71,          0.,          0.,        504.
      72,          0.,          0.,       511.2
      73,          0.,          0.,       518.4
      74,          0.,          0.,       525.6
      75,          0.,          0.,       532.8
      76,          0.,          0.,        540.
      77,          0.,          0.,       547.2
      78,          0.,          0.,       554.4
      79,          0.,          0.,       561.6
      80,          0.,          0.,       568.8
      81,          0.,          0.,        576.
      82,          0.,          0.,       583.2
      83,          0.,          0.,       590.4
      84,          0.,          0.,       597.6
      85,          0.,          0.,       604.8
      86,          0.,          0.,        612.
      87,          0.,          0.,       619.2
      88,          0.,          0.,       626.4
      89,          0.,          0.,       633.6
      90,          0.,          0.,       640.8
      91,          0.,          0.,        648.
      92,          0.,          0.,       655.2
      93,          0.,          0.,       662.4
      94,          0.,          0.,       669.6
      95,          0.,          0.,       676.8
      96,          0.,          0.,        684.
      97,          0.,          0.,       691.2
      98,          0.,          0.,       698.4
      99,          0.,          0.,       705.6
     100,          0.,          0.,       712.8
     102,-2.29715E-14,         60.,        720.
     103,-2.01001E-14,        52.5,        720.
     104,-1.72287E-14,         45.,        720.
     105,-1.43572E-14,        37.5,        720.
     106,-1.14858E-14,         30.,        720.
     107,-8.61433E-15,        22.5,        720.
     108,-5.74288E-15,         15.,        720.
     109,-2.87144E-15,         7.5,        720.
     110,          0.,          0.,        720.
     111,        -7.5,-2.87144E-15,        720.
     112,        -15.,-5.74288E-15,        720.
     113,       -22.5,-8.61433E-15,        720.
     114,        -30.,-1.14858E-14,        720.
     115,       -37.5,-1.43572E-14,        720.
     116,        -45.,-1.72287E-14,        720.
     117,       -52.5,-2.01001E-14,        720.
     118,        -60.,-2.29715E-14,        720.
     120,5.742883E-15,        -7.5,        720.
     121,1.148577E-14,        -15.,        720.
     122,1.722865E-14,       -22.5,        720.
     123,2.297153E-14,        -30.,        720.
     124,2.871442E-14,       -37.5,        720.
     125, 3.44573E-14,        -45.,        720.
     126,4.020018E-14,       -52.5,        720.
     127,4.594307E-14,        -60.,        720.
     129,         7.5,          0.,        720.
     130,         15.,          0.,        720.
     131,        22.5,          0.,        720.
     132,         30.,          0.,        720.
     133,        37.5,          0.,        720.
     134,         45.,          0.,        720.
     135,        52.5,          0.,        720.
     136,         60.,          0.,        720.
*ELEMENT, TYPE=B31, ELSET=P1_1
      1,      1,      2
      2,      2,      3
      3,      3,      4
      4,      4,      5
      5,      5,      6
      6,      6,      7
      7,      7,      8
      8,      8,      9
      9,      9,     10
     10,     10,     11
     11,     11,     12
     12,     12,     13
     13,     13,     14
     14,     14,     15
     15,     15,     16
     16,     16,     17
     17,     17,     18
     18,     18,     19
     19,     19,     20
     20,     20,     21
     21,     21,     22
     22,     22,     23
     23,     23,     24
     24,     24,     25
     25,     25,     26
     26,     26,     27
     27,     27,     28
     28,     28,     29
     29,     29,     30
     30,     30,     31
     31,     31,     32
     32,     32,     33
     33,     33,     34
     34,     34,     35
     35,     35,     36
     36,     36,     37
     37,     37,     38
     38,     38,     39
     39,     39,     40
     40,     40,     41
     41,     41,     42
     42,     42,     43
     43,     43,     44
     44,     44,     45
     45,     45,     46
     46,     46,     47
     47,     47,     48
     48,     48,     49
     49,     49,     50
     50,     50,     51
     51,     51,     52
     52,     52,     53
     53,     53,     54
     54,     54,     55
     55,     55,     56
     56,     56,     57
     57,     57,     58
     58,     58,     59
     59,     59,     60
     60,     60,     61
     61,     61,     62
     62,     62,     63
     63,     63,     64
     64,     64,     65
     65,     65,     66
     66,     66,     67
     67,     67,     68
     68,     68,     69
     69,     69,     70
     70,     70,     71
     71,     71,     72
     72,     72,     73
     73,     73,     74
     74,     74,     75
     75,     75,     76
     76,     76,     77
     77,     77,     78
     78,     78,     79
     79,     79,     80
     80,     80,     81
     81,     81,     82
     82,     82,     83
     83,     83,     84
     84,     84,     85
     85,     85,     86
     86,     86,     87
     87,     87,     88
     88,     88,     89
     89,     89,     90
     90,     90,     91
     91,     91,     92
     92,     92,     93
     93,     93,     94
     94,     94,     95
     95,     95,     96
     96,     96,     97
     97,     97,     98
     98,     98,     99
     99,     99,    100
    100,    100,    110
*ELEMENT, TYPE=B31, ELSET=P1_2
    101,    102,    103
    102,    103,    104
    103,    104,    105
    104,    105,    106
    105,    106,    107
    106,    107,    108
    107,    108,    109
    108,    109,    110
    109,    110,    111
    110,    111,    112
    111,    112,    113
    112,    113,    114
    113,    114,    115
    114,    115,    116
    115,    116,    117
    116,    117,    118
    117,    110,    120
    118,    120,    121
    119,    121,    122
    120,    122,    123
    121,    123,    124
    122,    124,    125
    123,    125,    126
    124,    126,    127
    125,    110,    129
    126,    129,    130
    127,    130,    131
    128,    131,    132
    129,    132,    133
    130,    133,    134
    131,    134,    135
    132,    135,    136
*ELSET, ELSET=OUT_BEAM, GENERATE
1,132,1
** STARMAP Property 1 and 2 : 8" square
*BEAM SECTION, MATERIAL=M1, ELSET=P1_2, SECTION=RECT
8.0,8.0
1.0, 1.0, 1.0
*BEAM SECTION, MATERIAL=M1, ELSET=P1_1, SECTION=RECT
8.0,8.0
1.0, 1.0, 1.0
** STARMAP Material 1 : AISI 1025 Carbon Steel
*MATERIAL, NAME=M1
*ELASTIC, TYPE=ISOTROPIC
 29000000.,      0.32,       70.
*EXPANSION, TYPE=ISO
     6.E-6,       70.
*DENSITY
0.00073574
*SPECIFIC HEAT
   44.8224,       70.
*CONDUCTIVITY, TYPE=ISO
0.00069444,       70.
** Load Step 1 -------------------------------------------------------
*STEP, INC=1000
dload
*FREQUENCY,  STORAGE=YES
   85, 0.1,    1500.,
*NODE PRINT, NSET=GLOBAL
    U
*EL PRINT, ELSET=OUT_BEAM
    S
*NODE FILE
  U
*EL FILE
    S
*BOUNDARY, OP=NEW
    1,    1
    1,    2
    1,    3
    1,    4
    1,    5
    1,    6
*ELSET, ELSET=EAB, GENERATE
    1,  132
*AMPLITUDE, NAME=ONE
0.0,1.0,  2000.0,1.0
*DLOAD, AMPLITUDE=ONE
EAB, GRAV,     386.4,        0.,        0.,        1.
*CLOAD, OP=NEW
110, 1,0.0
*END STEP
** Load Step 2 -------------------------------------------------------
*STEP
dload
*STEADY STATE DYNAMICS
       0.1,     1500.,   , 3
*AMPLITUDE, NAME=90HZ
0.0,0.0,  89.9,0.0, 90.0,1.0, 91.0,1.0, 91.1,0.0
2000.0, 0.0
*NODE PRINT, NSET=GLOBAL
    U
*EL PRINT, ELSET=OUT_BEAM
    S
*NODE FILE
    U
*EL FILE
    S
*ELSET, GENERATE, ELSET=E_ALL
    1,  132
*CLOAD, OP=NEW, AMPLITUDE=90HZ
110, 1,1000.0
*END STEP
