*NODE
      6216,  0.0            ,  0.0            ,  0.0
      6217,  25.0           ,  43.333333333333,  0.0
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*ELEMENT,TYPE=S4,ELSET=shell-elem
      6318,      6486,      6269,      6216,      6217
      6317,      6485,      6268,      6269,      6486
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*ELSET, ELSET=tri-prop
      6318,      6317,      6316,      6315,      6314,      6313
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*SHELL SECTION, ELSET=tri-prop, MATERIAL=tri-mat
3.0       ,
*MATERIAL, NAME=tri-mat
*ELASTIC, TYPE = ISOTROPIC
193000.0  ,0.27      ,0.0
*STEP
*STATIC
*BOUNDARY
      6216,1,6,0.0
      6261,1,6,0.0
      6269,1,6,0.0
      6268,1,6,0.0
      6267,1,6,0.0
      6266,1,6,0.0
      6265,1,6,0.0
      6264,1,6,0.0
      6263,1,6,0.0
      6262,1,6,0.0
      6260,1,6,0.0
      6259,1,6,0.0
      6258,1,6,0.0
      6257,1,6,0.0
      6256,1,6,0.0
      6255,1,6,0.0
      6254,1,6,0.0
      6253,1,6,0.0
      6252,1,6,0.0
*CLOAD
      6234,3,-100.0
*NODE FILE
U,
RF,
*EL FILE
S,
*END STEP
*****
